# OpenSim document version 40500
InverseKinematicsTool:
  time_range: 0 2.64
  marker_file: MarkerFiles/RightAnkle_markers.trc
  IKTaskSet:
    IKMarkerTask R_Shoulder: apply=false weight=1
    IKMarkerTask L_Shoulder: apply=false weight=1
    IKMarkerTask R_Elbow: apply=false weight=1
    IKMarkerTask L_Elbow: apply=false weight=1
    IKMarkerTask R_Wrist: apply=false weight=1
    IKMarkerTask L_Wrist: apply=false weight=1
    IKMarkerTask R_Asis: apply=false weight=1
    IKMarkerTask L_Asis: apply=false weight=1
    IKMarkerTask Sacral: apply=true weight=1
    IKMarkerTask Lumbar: apply=false weight=1
    IKMarkerTask Sternum: apply=false weight=1
    IKMarkerTask R_Thigh_Superior: apply=true weight=1
    IKMarkerTask R_Thigh_Inferior: apply=true weight=1
    IKMarkerTask R_Thigh_Lateral: apply=true weight=1
    IKMarkerTask R_Knee_Lateral: apply=false weight=1
    IKMarkerTask R_Knee_Medial: apply=false weight=1
    IKMarkerTask R_Patella: apply=false weight=1
    IKMarkerTask R_Shank_Superior: apply=true weight=1
    IKMarkerTask R_Shank_Inferior: apply=true weight=1
    IKMarkerTask R_Shank_Lateral: apply=true weight=1
    IKMarkerTask R_Ankle_Lateral: apply=false weight=1
    IKMarkerTask R_Ankle_Medial: apply=false weight=1
    IKMarkerTask R_Heel: apply=true weight=1
    IKMarkerTask R_Toe: apply=true weight=1
    IKMarkerTask R_Toe_Joint_Lateral: apply=false weight=1
    IKMarkerTask R_Toe_Joint_Medial: apply=false weight=1
    IKMarkerTask R_Midfoot_Superior: apply=true weight=1
    IKMarkerTask R_Midfoot_Lateral: apply=true weight=1
    IKMarkerTask L_Thigh_Superior: apply=true weight=1
    IKMarkerTask L_Thigh_Inferior: apply=true weight=1
    IKMarkerTask L_Thigh_Lateral: apply=true weight=1
    IKMarkerTask L_Knee_Lateral: apply=false weight=1
    IKMarkerTask L_Knee_Medial: apply=false weight=1
    IKMarkerTask L_Patella: apply=false weight=1
    IKMarkerTask L_Shank_Superior: apply=true weight=1
    IKMarkerTask L_Shank_Inferior: apply=true weight=1
    IKMarkerTask L_Shank_Lateral: apply=true weight=1
    IKMarkerTask L_Ankle_Lateral: apply=false weight=1
    IKMarkerTask L_Ankle_Medial: apply=false weight=1
    IKMarkerTask L_Heel: apply=true weight=1
    IKMarkerTask L_Toe: apply=true weight=1
    IKMarkerTask L_Toe_Joint_Lateral: apply=false weight=1
    IKMarkerTask L_Toe_Joint_Medial: apply=false weight=1
    IKMarkerTask L_Midfoot_Superior: apply=true weight=1
    IKMarkerTask L_Midfoot_Lateral: apply=true weight=1
