# OpenSim document version 40000
JointModelPersonalizationTool:
  input_model_file: kneeJointParameters/UF_Subject_3_v9.osim
  output_model_file: UF_Subject_3_v10.osim
  results_directory: femurMarkerMotion
  allowable_error: 0.005
  accuracy: 1e-6
  diff_min_change: 1e-4
  optimality_tolerance: 1e-4
  function_tolerance: 1e-4
  step_tolerance: 1e-6
  max_function_evaluations: 400
  JMPTaskList:
    JMPTask Right femur and Hip: is_enabled=true index=1 marker_file_name=GaitTrial_markers_jmp.trc
      JMPBodySet:
        JMPBody femur_r: scale_body=true move_markers=(true false true)
        JMPBody tibia_r: scale_body=true move_markers=(true false true)
        JMPBody calcn_r: scale_body=false move_markers=(false false false)
