# OpenSim document version 40000
JointModelPersonalizationTool:
  input_model_file: RightLegAndPelvis.osim
  output_model_file: RightLegAndPelvisKnee.osim
  results_directory: kneeJointParameters
  allowable_error: 0.005
  accuracy: 1e-6
  diff_min_change: 1e-4
  optimality_tolerance: 1e-4
  function_tolerance: 1e-4
  step_tolerance: 1e-6
  max_function_evaluations: 400
  JMPTaskList:
    JMPTask Right Knee: is_enabled=true index=1 marker_file_name=GaitTrial_markers_jmp.trc
      JMPJointSet:
        JMPJoint knee_r:
          parent_frame_transformation: translation=(false false false) orientation=(true true false)
              translation_bounds=0.1 orientation_bounds=1 [radians]
          child_frame_transformation: translation=(false false false) orientation=(true true false)
              translation_bounds=0.1 orientation_bounds=1 [radians]
