# OpenSim document version 40500
ScaleTool UF_Subject_3_v2:
  mass: 68.17 [kg]
  height: -1
  age: -1
  ModelScaler:
    apply: true
    scaling_order: measurements
    marker_file: MarkerFiles/StaticTrial_markers.trc
    time_range: 0 4.99
    preserve_mass_distribution: true
    MeasurementSet:
      Measurement PelvisWidth: apply=true
        MarkerPair: markers=(R_Asis L_Asis)
        BodyScale pelvis: axes=(X Y Z)
      Measurement ThighLength: apply=true
        MarkerPair: markers=(R_Asis R_Knee_Lateral)
        MarkerPair: markers=(L_Asis L_Knee_Lateral)
        BodyScale femur_r: axes=(X Y Z)
        BodyScale patella_r: axes=(X Y Z)
        BodyScale femur_l: axes=(X Y Z)
        BodyScale patella_l: axes=(X Y Z)
      Measurement ShankLength: apply=true
        MarkerPair: markers=(R_Knee_Lateral R_Ankle_Lateral)
        MarkerPair: markers=(L_Knee_Lateral L_Ankle_Lateral)
        MarkerPair: markers=(R_Knee_Medial R_Ankle_Medial)
        MarkerPair: markers=(L_Knee_Medial L_Ankle_Medial)
        BodyScale tibia_r: axes=(X Y Z)
        BodyScale tibia_l: axes=(X Y Z)
      Measurement FootLength: apply=true
        MarkerPair: markers=(R_Heel R_Toe)
        MarkerPair: markers=(L_Heel L_Toe)
        BodyScale talus_r: axes=(X Y Z)
        BodyScale calcn_r: axes=(X Y Z)
        BodyScale toes_r: axes=(X Y Z)
        BodyScale talus_l: axes=(X Y Z)
        BodyScale calcn_l: axes=(X Y Z)
        BodyScale toes_l: axes=(X Y Z)
      Measurement TrunkHeight: apply=true
        MarkerPair: markers=(R_Asis R_Shoulder)
        MarkerPair: markers=(L_Asis L_Shoulder)
        BodyScale torso: axes=(X Y)
      Measurement TrunkWidth: apply=true
        MarkerPair: markers=(R_Shoulder L_Shoulder)
        BodyScale torso: axes=Z
      Measurement ArmLength: apply=true
        MarkerPair: markers=(R_Shoulder R_Elbow)
        MarkerPair: markers=(L_Shoulder L_Elbow)
        BodyScale humerus_r: axes=(X Y Z)
        BodyScale humerus_l: axes=(X Y Z)
      Measurement ForearmLength: apply=true
        MarkerPair: markers=(R_Elbow R_Wrist)
        MarkerPair: markers=(L_Elbow L_Wrist)
        BodyScale ulna_r: axes=(X Y Z)
        BodyScale radius_r: axes=(X Y Z)
        BodyScale hand_r: axes=(X Y Z)
        BodyScale ulna_l: axes=(X Y Z)
        BodyScale radius_l: axes=(X Y Z)
        BodyScale hand_l: axes=(X Y Z)
  MarkerPlacer:
    apply: true
    marker_file: MarkerFiles/StaticTrial_markers.trc
    time_range: 2 3
    output_model_file: C:\Users\rs200\Documents\GitHub\nmsm-tutorial\Step-1-Joint-Model-Personalization\UF_Subject_3_v2.osim
    max_marker_movement: -1
    IKTaskSet:
      IKMarkerTask R_Shoulder: apply=true weight=1
      IKMarkerTask L_Shoulder: apply=true weight=1
      IKMarkerTask R_Elbow: apply=true weight=1
      IKMarkerTask L_Elbow: apply=true weight=1
      IKMarkerTask R_Wrist: apply=true weight=1
      IKMarkerTask L_Wrist: apply=true weight=1
      IKMarkerTask R_Asis: apply=true weight=10
      IKMarkerTask L_Asis: apply=true weight=10
      IKMarkerTask Sacral: apply=true weight=10
      IKMarkerTask Lumbar: apply=false weight=1
      IKMarkerTask Sternum: apply=false weight=1
      IKMarkerTask R_Thigh_Superior: apply=false weight=1
      IKMarkerTask R_Thigh_Inferior: apply=false weight=1
      IKMarkerTask R_Knee_Lateral: apply=true weight=10
      IKMarkerTask R_Knee_Medial: apply=true weight=10
      IKMarkerTask R_Patella: apply=false weight=1
      IKMarkerTask R_Shank_Lateral: apply=false weight=1
      IKMarkerTask R_Ankle_Lateral: apply=true weight=1
      IKMarkerTask R_Ankle_Medial: apply=true weight=1
      IKMarkerTask R_Heel: apply=true weight=10
      IKMarkerTask R_Toe: apply=true weight=10
      IKMarkerTask R_Toe_Joint_Lateral: apply=true weight=10
      IKMarkerTask R_Toe_Joint_Medial: apply=true weight=10
      IKMarkerTask R_Midfoot_Superior: apply=false weight=1
      IKMarkerTask R_Midfoot_Lateral: apply=false weight=1
      IKMarkerTask L_Thigh_Superior: apply=false weight=1
      IKMarkerTask L_Thigh_Inferior: apply=false weight=1
      IKMarkerTask L_Thigh_Lateral: apply=false weight=1
      IKMarkerTask L_Knee_Lateral: apply=true weight=10
      IKMarkerTask L_Knee_Medial: apply=true weight=10
      IKMarkerTask L_Patella: apply=false weight=1
      IKMarkerTask L_Shank_Superior: apply=false weight=1
      IKMarkerTask L_Shank_Inferior: apply=false weight=1
      IKMarkerTask L_Shank_Lateral: apply=false weight=1
      IKMarkerTask L_Ankle_Lateral: apply=true weight=1
      IKMarkerTask L_Ankle_Medial: apply=true weight=1
      IKMarkerTask L_Heel: apply=true weight=10
      IKMarkerTask L_Toe: apply=true weight=10
      IKMarkerTask L_Toe_Joint_Lateral: apply=true weight=10
      IKMarkerTask L_Toe_Joint_Medial: apply=true weight=10
      IKMarkerTask L_Midfoot_Superior: apply=false weight=1
      IKMarkerTask L_Midfoot_Lateral: apply=false weight=1
