# OpenSim document version 40500
Model RCNL_Fullbody_Walking_Model_Reduced_Muscles:
  gravity: 0 -9.80665 0
  length_units: meters
  force_units: N
  credits:
    Rice Computational Neuromechanics Lab (RCNL): B.J. Fregly, Marleny M. Vega, Claire V. Hammond, Mohammad S. Shourijeh, Di Ao, Spencer T. Williams, Geng Li, and Ayman W. Habib. This model was created for use in the RCNL Neuromusculoskeletal Modeling Pipeline software.
  publications:
    This full-body model is a modified version of the one provided with the following publication: Rajagopal, Apoorva, et al. "Full-Body Musculoskeletal Model for Muscle-Driven Simulation of Human Gait." IEEE Transactions on Biomedical Engineering 63.10 (2016): 2068-2079. (2016)
  Ground
  BodySet:
    Body pelvis: mass=10.65662 [kg] mass_center=(-0.0761575 0 0) inertia=(0.1079356 0.09145124 0.0607925 0 0 0)
        meshes=(r_pelvis.vtp l_pelvis.vtp sacrum.vtp)
      WrapCylinder Gmax1_at_pelvis_r: xyz_body_rotation=(-0.6 0.45 0) translation=(-0.08294381 -0.106642 0.06570873)
          quadrant=-x radius=0.04308769 length=0.1615788
      WrapCylinder Gmax2_at_pelvis_r: xyz_body_rotation=(-0.75 0.39 0) translation=(-0.08617538 -0.08940696 0.07324908)
          quadrant=all radius=0.04308769 length=0.1077192
      WrapCylinder Gmax3_at_pelvis_r: xyz_body_rotation=(-0.1 0 0) translation=(-0.08940696 -0.09479292 0.07324908)
          quadrant=all radius=0.04308769 length=0.1077192
      WrapCylinder Gmax1_at_pelvis_l: xyz_body_rotation=(0.6 -0.45 0) translation=(-0.08294381 -0.106642 -0.06570873)
          quadrant=-x radius=0.04308769 length=0.1615788
      WrapCylinder Gmax2_at_pelvis_l: xyz_body_rotation=(0.75 -0.39 0)
          translation=(-0.08617538 -0.08940696 -0.07324908) quadrant=all radius=0.04308769 length=0.1077192
      WrapCylinder Gmax3_at_pelvis_l: xyz_body_rotation=(0.1 0 0) translation=(-0.08940696 -0.09479292 -0.07324908)
          quadrant=all radius=0.04308769 length=0.1077192
      WrapCylinder PS_at_brim_r: xyz_body_rotation=(-0.25 -0.27 0.1) translation=(-0.07971223 -0.06463154 0.07066381)
          quadrant=-y radius=0.05385961 length=0.1077192
      WrapCylinder PS_at_brim_l: xyz_body_rotation=(0.25 0.27 0.1) translation=(-0.07971223 -0.06463154 -0.07066381)
          quadrant=-y radius=0.05385961 length=0.1077192
      WrapCylinder IL_at_brim_r: xyz_body_rotation=(-0.32 -0.24 0.9) translation=(-0.07648065 -0.0700175 0.08143574)
          quadrant=-y radius=0.05913786 length=0.1077192
      WrapCylinder IL_at_brim_l: xyz_body_rotation=(0.32 0.24 0.9) translation=(-0.07648065 -0.0700175 -0.08143574)
          quadrant=-y radius=0.05913786 length=0.1077192
    Body femur_r: mass=8.416534 mass_center=(0 -0.168266 0) inertia=(0.1187026 0.03111622 0.1251741 0 0 0)
        meshes=r_femur.vtp
      WrapCylinder Gastroc_at_condyles_r: translation=(0.004948999 -0.4058179 0) quadrant=all radius=0.02474499
          length=0.09897998
      WrapCylinder KnExt_at_fem_r: xyz_body_rotation=(-0.0623366 0.0507601 0)
          translation=(0.003551679 -0.398624 0.00206978) quadrant=all radius=0.02474499 length=0.09897998
      WrapCylinder AB_at_femshaft_r: xyz_body_rotation=(1.66157 0.186644 0)
          translation=(0.01449403 -0.1114465 0.02312667) quadrant=all radius=0.0163317 length=0.06928598
      WrapCylinder AL_at_femshaft_r: xyz_body_rotation=(1.77711 0.136489 0)
          translation=(0.03041922 -0.2295435 0.01495954) quadrant=all radius=0.01989498 length=0.09897998
      WrapCylinder AMprox_at_femshaft_r: xyz_body_rotation=(1.61126 0.18656 0)
          translation=(0.005130122 -0.07215126 0.02514388) quadrant=all radius=0.02088478 length=0.06928598
      WrapCylinder AMmid_at_femshaft_r: xyz_body_rotation=(1.61139 0.13656 0)
          translation=(0.02277777 -0.1590717 0.02037424) quadrant=all radius=0.02118172 length=0.118776
      WrapCylinder AMdist_at_femshaft_r: xyz_body_rotation=(1.71188 0.186636 0)
          translation=(0.03128411 -0.2580764 0.009269079) quadrant=all radius=0.02157764 length=0.19796
      WrapCylinder AMisch_at_condyles_r: xyz_body_rotation=(1.71115 -0.463363 0)
          translation=(-0.02242005 -0.3729872 -0.003122195) quadrant=all radius=0.03959199 length=0.2375519
      WrapCylinder PECT_at_femshaft_r: xyz_body_rotation=(1.81295 0.276344 0)
          translation=(0.006023654 -0.08364095 0.03013) quadrant=all radius=0.014847 length=0.04948999
    Body patella_r: mass=0.07799958 mass_center=(0.001784251 0.02616901 0)
        inertia=(2.551723e-6 1.165613e-5 1.165613e-5 0 0 0) meshes=r_patella.vtp
    Body tibia_r: mass=3.354796 mass_center=(0 -0.1966489 0) inertia=(0.05059529 0.005119761 0.051298 0 0 0)
        meshes=(r_tibia.vtp r_fibula.vtp)
      WrapCylinder GasLat_at_shank_r: xyz_body_rotation=(2.96723 -0.279725 -1.47812)
          translation=(-0.007794334 -0.07794334 -0.003475852) quadrant=-y radius=0.05793086 length=0.1053288
      WrapCylinder GasMed_at_shank_r: xyz_body_rotation=(2.96723 0.0279725 -1.47812)
          translation=(-0.007794334 -0.07794334 -0.003475852) quadrant=-y radius=0.05793086 length=0.1053288
      WrapCylinder GR_at_condyles_r: xyz_body_rotation=(0 -0.4 0) translation=(-0.003159865 -0.02106577 0) quadrant=all
          radius=0.03791838 length=0.1053288
      WrapCylinder SM_at_condyles_r: xyz_body_rotation=(0 -0.1 0) translation=(-0.001053288 -0.02106577 0) quadrant=all
          radius=0.03707575 length=0.1053288
      WrapCylinder ST_at_condyles_r: xyz_body_rotation=(0 -0.2 0) translation=(-0.002106577 -0.02159241 0) quadrant=all
          radius=0.04476476 length=0.1053288
      WrapCylinder BF_at_gastroc_r: translation=(-0.06109073 -0.0631973 0) quadrant=y radius=0.03159865
          length=0.1579933
    Body pretalus_r: mass=9.048675e-9 mass_center=(0 0 0) inertia=(9.048675e-9 9.048675e-9 9.048675e-9 0 0 0)
    Body talus_r: mass=0.09048675 mass_center=(0 0 0) inertia=(0.0009978428 0.0009978428 0.0009978428 0 0 0)
        meshes=r_talus.stl
    Body calcn_r: mass=1.131084 mass_center=(0.1050119 0.03150357 0) inertia=(0.00139698 0.003891587 0.004091155 0 0 0)
        meshes=r_foot.vtp
    Body toes_r: mass=0.1959943 mass_center=(0.03633412 0.006300715 -0.01837708)
        inertia=(9.978428e-5 0.0001995686 0.0009978428 0 0 0) meshes=r_bofoot.vtp
    Body femur_l: mass=8.416534 mass_center=(0 -0.1675921 0) inertia=(0.1177538 0.03086749 0.1241735 0 0 0)
        meshes=l_femur.vtp
      WrapCylinder Gastroc_at_condyles_l: translation=(0.004929179 -0.4041927 0) quadrant=all radius=0.0246459
          length=0.09858359
      WrapCylinder KnExt_at_fem_l: xyz_body_rotation=(0.0623366 -0.0507601 0)
          translation=(0.003537455 -0.3970276 -0.002061491) quadrant=all radius=0.0246459 length=0.09858359
      WrapCylinder AB_at_femshaft_l: xyz_body_rotation=(-1.66157 -0.186644 0)
          translation=(0.01443599 -0.1110002 -0.02303405) quadrant=all radius=0.01626629 length=0.06900851
      WrapCylinder AL_at_femshaft_l: xyz_body_rotation=(-1.77711 -0.136489 0)
          translation=(0.0302974 -0.2286242 -0.01489963) quadrant=all radius=0.0198153 length=0.09858359
      WrapCylinder AMprox_at_femshaft_l: xyz_body_rotation=(-1.61126 -0.18656 0)
          translation=(0.005109577 -0.07186231 -0.02504319) quadrant=all radius=0.02080114 length=0.06900851
      WrapCylinder AMmid_at_femshaft_l: xyz_body_rotation=(-1.61139 -0.13656 0)
          translation=(0.02268655 -0.1584347 -0.02029264) quadrant=all radius=0.02109689 length=0.1183003
      WrapCylinder AMdist_at_femshaft_l: xyz_body_rotation=(-1.71188 -0.186636 0)
          translation=(0.03115882 -0.2570429 -0.009231958) quadrant=all radius=0.02149122 length=0.1971672
      WrapCylinder AMisch_at_condyles_l: xyz_body_rotation=(-1.71115 0.463363 0)
          translation=(-0.02233027 -0.3714935 0.003109691) quadrant=all radius=0.03943343 length=0.2366006
      WrapCylinder PECT_at_femshaft_l: xyz_body_rotation=(-1.81295 -0.276344 0)
          translation=(0.005999531 -0.08330599 -0.03000934) quadrant=all radius=0.01478754 length=0.04929179
    Body patella_l: mass=0.07799958 mass_center=(0.001784251 0.02616901 0)
        inertia=(2.551723e-6 1.165613e-5 1.165613e-5 0 0 0) meshes=l_patella.vtp
    Body tibia_l: mass=3.354796 mass_center=(0 -0.1939804 0) inertia=(0.04923147 0.004981755 0.04991524 0 0 0)
        meshes=(l_tibia.vtp l_fibula.vtp)
      WrapCylinder GasLat_at_shank_l: xyz_body_rotation=(-2.96723 0.279725 -1.47812)
          translation=(-0.007688566 -0.07688566 0.003428685) quadrant=-y radius=0.05714475 length=0.1038995
      WrapCylinder GasMed_at_shank_l: xyz_body_rotation=(-2.96723 -0.0279725 -1.47812)
          translation=(-0.007688566 -0.07688566 0.003428685) quadrant=-y radius=0.05714475 length=0.1038995
      WrapCylinder GR_at_condyles_l: xyz_body_rotation=(0 0.4 0) translation=(-0.003116986 -0.02077991 0) quadrant=all
          radius=0.03740383 length=0.1038995
      WrapCylinder SM_at_condyles_l: xyz_body_rotation=(0 0.1 0) translation=(-0.001038995 -0.02077991 0) quadrant=all
          radius=0.03657264 length=0.1038995
      WrapCylinder ST_at_condyles_l: xyz_body_rotation=(0 0.2 0) translation=(-0.002077991 -0.02129941 0) quadrant=all
          radius=0.0441573 length=0.1038995
      WrapCylinder BF_at_gastroc_l: translation=(-0.06026173 -0.06233972 0) quadrant=all radius=0.03116986
          length=0.1558493
    Body pretalus_l: mass=9.048675e-9 mass_center=(0 0 0) inertia=(9.048675e-9 9.048675e-9 9.048675e-9 0 0 0)
    Body talus_l: mass=0.09048675 mass_center=(0 0 0) inertia=(0.0009978428 0.0009978428 0.0009978428 0 0 0)
        meshes=l_talus.stl
    Body calcn_l: mass=1.131084 mass_center=(0.1050119 0.03150357 0) inertia=(0.00139698 0.003891587 0.004091155 0 0 0)
        meshes=l_foot.vtp
    Body toes_l: mass=0.1959943 mass_center=(0.03633412 0.006300715 0.01837708)
        inertia=(9.978428e-5 0.0001995686 0.0009978428 0 0 0) meshes=l_bofoot.vtp
    Body torso: mass=24.27452 mass_center=(-0.02860217 0.3050899 0) inertia=(1.218842 0.6335116 1.218842 0 0 0)
        meshes=(hat_spine.vtp hat_jaw.vtp hat_skull.vtp hat_ribs_scap.vtp)
    Body humerus_r: mass=1.839143 mass_center=(0 -0.1777869 0) inertia=(0.01262597 0.004355569 0.01417224 0 0 0)
        meshes=humerus_rv.vtp
    Body ulna_r: mass=0.549707 mass_center=(0 -0.1218119 0) inertia=(0.002737758 0.0005712136 0.002969756 0 0 0)
        meshes=ulna_rv.vtp
    Body radius_r: mass=0.549707 mass_center=(0 -0.1218119 0) inertia=(0.002737758 0.0005712136 0.002969756 0 0 0)
        meshes=radius_rv.vtp
    Body hand_r: mass=0.4139769 mass_center=(0 -0.06882207 0) inertia=(0.0008244701 0.0005055887 0.001238554 0 0 0)
        meshes=(pisiform_rvs.vtp lunate_rvs.vtp scaphoid_rvs.vtp triquetrum_rvs.vtp hamate_rvs.vtp capitate_rvs.vtp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)
    Body humerus_l: mass=1.839143 mass_center=(0 -0.1777869 0) inertia=(0.01262597 0.004355569 0.01417224 0 0 0)
        meshes=humerus_lv.vtp
    Body ulna_l: mass=0.549707 mass_center=(0 -0.1218119 0) inertia=(0.002737758 0.0005712136 0.002969756 0 0 0)
        meshes=ulna_lv.vtp
    Body radius_l: mass=0.549707 mass_center=(0 -0.1218119 0) inertia=(0.002737758 0.0005712136 0.002969756 0 0 0)
        meshes=radius_lv.vtp
    Body hand_l: mass=0.4139769 mass_center=(0 -0.06882207 0) inertia=(0.0008244701 0.0005055887 0.001238554 0 0 0)
        meshes=(pisiform_lvs.vtp lunate_lvs.vtp scaphoid_lvs.vtp triquetrum_lvs.vtp hamate_lvs.vtp capitate_lvs.vtp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)
  JointSet:
    CustomJoint ground_pelvis: socket_parent_frame=ground_offset socket_child_frame=pelvis_offset
      Coordinate pelvis_tilt: default_value=0 range=(-1.570796 1.570796) clamped=false
      Coordinate pelvis_list: default_value=0 range=(-1.570796 1.570796) clamped=false
      Coordinate pelvis_rotation: default_value=0 range=(-1.570796 1.570796) clamped=false
      Coordinate pelvis_tx: default_value=0 range=(-5 5) clamped=false
      Coordinate pelvis_ty: default_value=0.965 range=(-1 2) clamped=false
      Coordinate pelvis_tz: default_value=0 range=(-3 3) clamped=false
      PhysicalOffsetFrame ground_offset: socket_parent=/ground translation=(0 0 0) [meters]
      PhysicalOffsetFrame pelvis_offset: socket_parent=/bodyset/pelvis translation=(0 0 0)
      SpatialTransform:
        TransformAxis rotation1: coordinates=pelvis_tilt axis=(0 0 1) LinearFunction(coefficients=1 0)
        TransformAxis rotation2: coordinates=pelvis_list axis=(1 0 0) LinearFunction(coefficients=1 0)
        TransformAxis rotation3: coordinates=pelvis_rotation axis=(0 1 0) LinearFunction(coefficients=1 0)
        TransformAxis translation1: coordinates=pelvis_tx axis=(1 0 0) LinearFunction(coefficients=1 0)
        TransformAxis translation2: coordinates=pelvis_ty axis=(0 1 0) LinearFunction(coefficients=1 0)
        TransformAxis translation3: coordinates=pelvis_tz axis=(0 0 1) LinearFunction(coefficients=1 0)
    CustomJoint hip_r: socket_parent_frame=pelvis_offset socket_child_frame=femur_r_offset
      Coordinate hip_flexion_r: default_value=0 range=(-0.5235988 2.094395) clamped=false
      Coordinate hip_adduction_r: default_value=0 range=(-0.8726646 0.5235988) clamped=false
      Coordinate hip_rotation_r: default_value=0 range=(-0.6981317 0.6981317) clamped=false
      PhysicalOffsetFrame pelvis_offset: socket_parent=/bodyset/pelvis translation=(-0.06062007 -0.08454882 0.08322388)
      PhysicalOffsetFrame femur_r_offset: socket_parent=/bodyset/femur_r translation=(0 0 0)
      SpatialTransform: axes_held_at_zero=(translation1 translation2 translation3)
        TransformAxis rotation1: coordinates=hip_flexion_r axis=(0 0 1) LinearFunction(coefficients=1 0)
        TransformAxis rotation2: coordinates=hip_adduction_r axis=(1 0 0) LinearFunction(coefficients=1 0)
        TransformAxis rotation3: coordinates=hip_rotation_r axis=(0 1 0) LinearFunction(coefficients=1 0)
    CustomJoint knee_r: socket_parent_frame=femur_r_offset socket_child_frame=tibia_r_offset
      Coordinate knee_angle_r: default_value=2.713892e-5 range=(0 2.0944) clamped=true
      Coordinate knee_adduction_r: default_value=0.1041598 range=(-1 1) clamped=true locked=true
      PhysicalOffsetFrame femur_r_offset: socket_parent=/bodyset/femur_r
          translation=(-0.00800748 -0.4037987 -0.002721949) orientation=(-0.1028225 0.09645416 0.1246163) [radians]
      PhysicalOffsetFrame tibia_r_offset: socket_parent=/bodyset/tibia_r
          translation=(-0.008520618 -0.003723164 -0.001563859) orientation=(-0.09352335 0.1416426 0.1246163)
      SpatialTransform: axes_held_at_zero=translation3
        TransformAxis rotation1: coordinates=knee_angle_r axis=(0 0 -1) LinearFunction(coefficients=1 0)
        TransformAxis rotation2: coordinates=knee_adduction_r axis=(1 0 0) LinearFunction(coefficients=1 0)
        TransformAxis rotation3: coordinates=knee_angle_r axis=(0 1 0)
          SimmSpline: x=(0 0.174533 0.349066 0.523599 0.698132 0.872665 1.0472 1.22173 1.39626 1.5708 1.74533 1.91986 2.0944)
              y=(0 0.059461 0.109399 0.150618 0.18392 0.210107 0.229983 0.24435 0.254012 0.25977 0.262428 0.262788 0.261654)
        TransformAxis translation1: coordinates=knee_angle_r axis=(0 1 0)
          MultiplierFunction: scale=0.9897998
            SimmSpline: x=(0 0.174533 0.349066 0.523599 0.698132 0.872665 1.0472 1.22173 1.39626 1.5708 1.74533 1.91986 2.0944)
                y=(0 0.000479 0.000835 0.001086 0.001251 0.001346 0.001391 0.001403 0.0014 0.0014 0.001421 0.001481 0.001599)
        TransformAxis translation2: coordinates=knee_angle_r axis=(1 0 0)
          MultiplierFunction: scale=0.9897998
            SimmSpline: x=(0 0.174533 0.349066 0.523599 0.698132 0.872665 1.0472 1.22173 1.39626 1.5708 1.74533 1.91986 2.0944)
                y=(0 0.000988 0.001899 0.002734 0.003492 0.004173 0.004777 0.005305 0.005756 0.00613 0.006427 0.006648 0.006792)
    CustomJoint patellofemoral_r: socket_parent_frame=femur_r_offset socket_child_frame=patella_r_offset
      Coordinate knee_angle_r_beta: default_value=2.713892e-5 range=(-99999.9 99999.9) clamped=false
      PhysicalOffsetFrame femur_r_offset: socket_parent=/bodyset/femur_r
          translation=(-0.00800748 -0.4037987 -0.002721949)
      PhysicalOffsetFrame patella_r_offset: socket_parent=/bodyset/patella_r translation=(0 0 0)
      SpatialTransform: axes_held_at_zero=(rotation2 rotation3)
        TransformAxis rotation1: coordinates=knee_angle_r_beta axis=(0 0 1)
          SimmSpline: x=(0 0.174533 0.349066 0.523599 0.698132 0.872665 1.0472 1.22173 1.39626 1.5708 1.74533 1.91986 2.0944)
              y=(0.00113686 -0.00629212 -0.105582 -0.253683 -0.414245 -0.579047 -0.747244 -0.91799 -1.09044 -1.26379 -1.43763 -1.61186 -1.78634)
        TransformAxis translation1: coordinates=knee_angle_r_beta axis=(1 0 0)
          MultiplierFunction: scale=0.9897998
            SimmSpline: x=(0 0.174533 0.349066 0.523599 0.698132 0.872665 1.0472 1.22173 1.39626 1.5708 1.74533 1.91986 2.0944)
                y=(0.0524 0.0488 0.0437 0.0371 0.0296 0.0216 0.0136 0.0057 -0.0019 -0.0088 -0.0148 -0.0196 -0.0227)
        TransformAxis translation2: coordinates=knee_angle_r_beta axis=(0 1 0)
          MultiplierFunction: scale=0.9897998
            SimmSpline: x=(0 0.174533 0.349066 0.523599 0.698132 0.872665 1.0472 1.22173 1.39626 1.5708 1.74533 1.91986 2.0944)
                y=(-0.0108 -0.019 -0.0263 -0.0322 -0.0367 -0.0395 -0.0408 -0.0404 -0.0384 -0.0349 -0.0301 -0.0245 -0.0187)
        TransformAxis translation3: axis=(0 0 1) MultiplierFunction(scale=0.9897998, Constant(value=0.00275))
    PinJoint ankle_r: socket_parent_frame=tibia_r_offset socket_child_frame=pretalus_r_offset
      Coordinate ankle_angle_r: default_value=0 range=(-0.6981317 0.5235988) clamped=false
      PhysicalOffsetFrame tibia_r_offset: socket_parent=/bodyset/tibia_r translation=(-0.0105 -0.4028 0)
          orientation=(0.2034 -0.0741 0)
      PhysicalOffsetFrame pretalus_r_offset: socket_parent=/bodyset/pretalus_r translation=(0 0.015 0)
          orientation=(0 0.0147 0)
    WeldJoint pretalar_r: socket_parent_frame=pretalus_r_offset socket_child_frame=talus_r_offset
      PhysicalOffsetFrame pretalus_r_offset: socket_parent=/bodyset/pretalus_r translation=(0 0 0)
          orientation=(0 0 0.6951304)
      PhysicalOffsetFrame talus_r_offset: socket_parent=/bodyset/talus_r translation=(0 0 0)
    CustomJoint subtalar_r: socket_parent_frame=talus_r_offset socket_child_frame=calcn_r_offset
      Coordinate subtalar_angle_r: default_value=0 range=(-0.1745 0.5236) clamped=false
      PhysicalOffsetFrame talus_r_offset: socket_parent=/bodyset/talus_r translation=(0 -0.0019 0.0015)
          orientation=(0 0.3637 0)
      PhysicalOffsetFrame calcn_r_offset: socket_parent=/bodyset/calcn_r translation=(0.0571 0.0437 -0.0066)
          orientation=(0 0.1925 0.6869)
      SpatialTransform: axes_held_at_zero=(rotation2 rotation3 translation1 translation2 translation3)
        TransformAxis rotation1: coordinates=subtalar_angle_r axis=(1 0 0) LinearFunction(coefficients=1 0)
    PinJoint mtp_r: socket_parent_frame=calcn_r_offset socket_child_frame=toes_r_offset
      Coordinate mtp_angle_r: default_value=-0.1745329 range=(-0.5235988 0.5235988) clamped=true
      PhysicalOffsetFrame calcn_r_offset: socket_parent=/bodyset/calcn_r
          translation=(0.1877613 -0.002100238 0.001134129) orientation=(-3.141593 0.619901 0)
      PhysicalOffsetFrame toes_r_offset: socket_parent=/bodyset/toes_r translation=(0 0 0)
          orientation=(-3.14159 0.619901 0)
    CustomJoint hip_l: socket_parent_frame=pelvis_offset socket_child_frame=femur_l_offset
      Coordinate hip_flexion_l: default_value=0 range=(-0.5235988 2.094395) clamped=false
      Coordinate hip_adduction_l: default_value=0 range=(-0.8726646 0.5235988) clamped=false
      Coordinate hip_rotation_l: default_value=0 range=(-0.6981317 0.6981317) clamped=false
      PhysicalOffsetFrame pelvis_offset: socket_parent=/bodyset/pelvis
          translation=(-0.06062007 -0.08454882 -0.08322388)
      PhysicalOffsetFrame femur_l_offset: socket_parent=/bodyset/femur_l translation=(0 0 0)
      SpatialTransform: axes_held_at_zero=(translation1 translation2 translation3)
        TransformAxis rotation1: coordinates=hip_flexion_l axis=(0 0 1) LinearFunction(coefficients=1 0)
        TransformAxis rotation2: coordinates=hip_adduction_l axis=(1 0 0) LinearFunction(coefficients=-1 0)
        TransformAxis rotation3: coordinates=hip_rotation_l axis=(0 1 0) LinearFunction(coefficients=-1 0)
    CustomJoint knee_l: socket_parent_frame=femur_l_offset socket_child_frame=tibia_l_offset
      Coordinate knee_angle_l: default_value=2.713892e-5 range=(0 2.0944) clamped=true
      Coordinate knee_adduction_l: default_value=0.09533969 range=(-1 1) clamped=true locked=true
      PhysicalOffsetFrame femur_l_offset: socket_parent=/bodyset/femur_l
          translation=(-0.007975412 -0.4021816 0.002711049) orientation=(0.0007278204 -0.0802554 0.1246163)
      PhysicalOffsetFrame tibia_l_offset: socket_parent=/bodyset/tibia_l
          translation=(-0.008404995 -0.003672641 0.001542638) orientation=(0.003658078 -0.1320461 0.1246163)
      SpatialTransform: axes_held_at_zero=translation3
        TransformAxis rotation1: coordinates=knee_angle_l axis=(0 0 -1) LinearFunction(coefficients=1 0)
        TransformAxis rotation2: coordinates=knee_adduction_l axis=(-1 0 0) LinearFunction(coefficients=1 0)
        TransformAxis rotation3: coordinates=knee_angle_l axis=(0 -1 0)
          SimmSpline: x=(0 0.174533 0.349066 0.523599 0.698132 0.872665 1.0472 1.22173 1.39626 1.5708 1.74533 1.91986 2.0944)
              y=(0 0.059461 0.109399 0.150618 0.18392 0.210107 0.229983 0.24435 0.254012 0.25977 0.262428 0.262788 0.261654)
        TransformAxis translation1: coordinates=knee_angle_l axis=(0 1 0)
          MultiplierFunction: scale=0.9858359
            SimmSpline: x=(0 0.174533 0.349066 0.523599 0.698132 0.872665 1.0472 1.22173 1.39626 1.5708 1.74533 1.91986 2.0944)
                y=(0 0.000479 0.000835 0.001086 0.001251 0.001346 0.001391 0.001403 0.0014 0.0014 0.001421 0.001481 0.001599)
        TransformAxis translation2: coordinates=knee_angle_l axis=(-1 0 0)
          MultiplierFunction: scale=0.9858359
            SimmSpline: x=(0 0.174533 0.349066 0.523599 0.698132 0.872665 1.0472 1.22173 1.39626 1.5708 1.74533 1.91986 2.0944)
                y=(0 -0.000988 -0.001899 -0.002734 -0.003492 -0.004173 -0.004777 -0.005305 -0.005756 -0.00613 -0.006427 -0.006648 -0.006792)
    CustomJoint patellofemoral_l: socket_parent_frame=femur_l_offset socket_child_frame=patella_l_offset
      Coordinate knee_angle_l_beta: default_value=2.713892e-5 range=(-99999.9 99999.9) clamped=false
      PhysicalOffsetFrame femur_l_offset: socket_parent=/bodyset/femur_l
          translation=(-0.007975412 -0.4021816 0.002711049)
      PhysicalOffsetFrame patella_l_offset: socket_parent=/bodyset/patella_l translation=(0 0 0)
      SpatialTransform: axes_held_at_zero=(rotation2 rotation3)
        TransformAxis rotation1: coordinates=knee_angle_l_beta axis=(0 0 1)
          SimmSpline: x=(0 0.174533 0.349066 0.523599 0.698132 0.872665 1.0472 1.22173 1.39626 1.5708 1.74533 1.91986 2.0944)
              y=(0.00113686 -0.00629212 -0.105582 -0.253683 -0.414245 -0.579047 -0.747244 -0.91799 -1.09044 -1.26379 -1.43763 -1.61186 -1.78634)
        TransformAxis translation1: coordinates=knee_angle_l_beta axis=(1 0 0)
          MultiplierFunction: scale=0.9858359
            SimmSpline: x=(0 0.174533 0.349066 0.523599 0.698132 0.872665 1.0472 1.22173 1.39626 1.5708 1.74533 1.91986 2.0944)
                y=(0.0524 0.0488 0.0437 0.0371 0.0296 0.0216 0.0136 0.0057 -0.0019 -0.0088 -0.0148 -0.0196 -0.0227)
        TransformAxis translation2: coordinates=knee_angle_l_beta axis=(0 1 0)
          MultiplierFunction: scale=0.9858359
            SimmSpline: x=(0 0.174533 0.349066 0.523599 0.698132 0.872665 1.0472 1.22173 1.39626 1.5708 1.74533 1.91986 2.0944)
                y=(-0.0108 -0.019 -0.0263 -0.0322 -0.0367 -0.0395 -0.0408 -0.0404 -0.0384 -0.0349 -0.0301 -0.0245 -0.0187)
        TransformAxis translation3: axis=(0 0 1) MultiplierFunction(scale=0.9858359, Constant(value=-0.00275))
    PinJoint ankle_l: socket_parent_frame=tibia_l_offset socket_child_frame=pretalus_l_offset
      Coordinate ankle_angle_l: default_value=0 range=(-0.6981317 0.5235988) clamped=false
      PhysicalOffsetFrame tibia_l_offset: socket_parent=/bodyset/tibia_l translation=(-0.0105 -0.4028 0)
          orientation=(-0.2034 0.0741 0)
      PhysicalOffsetFrame pretalus_l_offset: socket_parent=/bodyset/pretalus_l translation=(0 0.015 0)
          orientation=(0 -0.0147 0)
    WeldJoint pretalar_l: socket_parent_frame=pretalus_l_offset socket_child_frame=talus_l_offset
      PhysicalOffsetFrame pretalus_l_offset: socket_parent=/bodyset/pretalus_l translation=(0 0 0)
          orientation=(0 0 0.6951304)
      PhysicalOffsetFrame talus_l_offset: socket_parent=/bodyset/talus_l translation=(0 0 0)
    CustomJoint subtalar_l: socket_parent_frame=talus_l_offset socket_child_frame=calcn_l_offset
      Coordinate subtalar_angle_l: default_value=0 range=(-0.1745 0.5236) clamped=false
      PhysicalOffsetFrame talus_l_offset: socket_parent=/bodyset/talus_l translation=(0 -0.0019 -0.0015)
          orientation=(0 -0.3637 0)
      PhysicalOffsetFrame calcn_l_offset: socket_parent=/bodyset/calcn_l translation=(0.0571 0.0437 0.0066)
          orientation=(0 -0.1925 0.6869)
      SpatialTransform: axes_held_at_zero=(rotation2 rotation3 translation1 translation2 translation3)
        TransformAxis rotation1: coordinates=subtalar_angle_l axis=(-1 0 0) LinearFunction(coefficients=1 0)
    PinJoint mtp_l: socket_parent_frame=calcn_l_offset socket_child_frame=toes_l_offset
      Coordinate mtp_angle_l: default_value=-0.1745329 range=(-0.5235988 0.5235988) clamped=true
      PhysicalOffsetFrame calcn_l_offset: socket_parent=/bodyset/calcn_l
          translation=(0.1877613 -0.002100238 -0.001134129) orientation=(-3.14159 -0.619901 0)
      PhysicalOffsetFrame toes_l_offset: socket_parent=/bodyset/toes_l translation=(0 0 0)
          orientation=(-3.14159 -0.619901 0)
    CustomJoint back: socket_parent_frame=pelvis_offset socket_child_frame=torso_offset
      Coordinate lumbar_extension: default_value=0 range=(-1.570796 1.570796) clamped=true
      Coordinate lumbar_bending: default_value=0 range=(-1.570796 1.570796) clamped=true
      Coordinate lumbar_rotation: default_value=0 range=(-1.570796 1.570796) clamped=true
      PhysicalOffsetFrame pelvis_offset: socket_parent=/bodyset/pelvis translation=(-0.1084733 0.08779117 0)
      PhysicalOffsetFrame torso_offset: socket_parent=/bodyset/torso translation=(0 0 0)
      SpatialTransform: axes_held_at_zero=(translation1 translation2 translation3)
        TransformAxis rotation1: coordinates=lumbar_extension axis=(0 0 1) LinearFunction(coefficients=1 0)
        TransformAxis rotation2: coordinates=lumbar_bending axis=(1 0 0) LinearFunction(coefficients=1 0)
        TransformAxis rotation3: coordinates=lumbar_rotation axis=(0 1 0) LinearFunction(coefficients=1 0)
    CustomJoint acromial_r: socket_parent_frame=torso_offset socket_child_frame=humerus_r_offset
      Coordinate arm_flex_r: default_value=0 range=(-1.570796 1.570796) clamped=true
      Coordinate arm_add_r: default_value=-4.037032e-11 range=(-2.094395 1.570796) clamped=true
      Coordinate arm_rot_r: default_value=0 range=(-1.570796 1.570796) clamped=true
      PhysicalOffsetFrame torso_offset: socket_parent=/bodyset/torso translation=(0.003007995 0.3541902 0.1652366)
      PhysicalOffsetFrame humerus_r_offset: socket_parent=/bodyset/humerus_r translation=(0 0 0)
      SpatialTransform: axes_held_at_zero=(translation1 translation2 translation3)
        TransformAxis rotation1: coordinates=arm_flex_r axis=(0 0 1) LinearFunction(coefficients=1 0)
        TransformAxis rotation2: coordinates=arm_add_r axis=(1 0 0) LinearFunction(coefficients=1 0)
        TransformAxis rotation3: coordinates=arm_rot_r axis=(0 1 0) LinearFunction(coefficients=1 0)
    PinJoint elbow_r: socket_parent_frame=humerus_r_offset socket_child_frame=ulna_r_offset
      Coordinate elbow_flex_r: default_value=2.713875e-5 range=(0 2.618) clamped=true
      PhysicalOffsetFrame humerus_r_offset: socket_parent=/bodyset/humerus_r
          translation=(0.01420549 -0.309392 -0.01036988) orientation=(-0.0228627 0.228018 0.0051689)
      PhysicalOffsetFrame ulna_r_offset: socket_parent=/bodyset/ulna_r translation=(0 0 0)
          orientation=(-0.0228627 0.228018 0.0051689)
    PinJoint radioulnar_r: socket_parent_frame=ulna_r_offset socket_child_frame=radius_r_offset
      Coordinate pro_sup_r: default_value=1.570796 range=(0 1.570796) clamped=true locked=true
      PhysicalOffsetFrame ulna_r_offset: socket_parent=/bodyset/ulna_r translation=(-0.006798827 -0.01314588 0.0263615)
          orientation=(-1.56884 0.056428 1.53614)
      PhysicalOffsetFrame radius_r_offset: socket_parent=/bodyset/radius_r translation=(0 0 0)
          orientation=(-1.56884 0.056428 1.53614)
    UniversalJoint radius_hand_r: socket_parent_frame=radius_r_offset socket_child_frame=hand_r_offset
      Coordinate wrist_flex_r: default_value=0 range=(-1.22173 1.22173) clamped=true locked=true
      Coordinate wrist_dev_r: default_value=0 range=(-0.4363323 0.6108652) clamped=true locked=true
      PhysicalOffsetFrame radius_r_offset: socket_parent=/bodyset/radius_r
          translation=(-0.008890929 -0.2383592 0.01375532) orientation=(-1.5708 0 -1.5708)
      PhysicalOffsetFrame hand_r_offset: socket_parent=/bodyset/hand_r translation=(0 0 0)
          orientation=(-1.5708 0 -1.5708)
    CustomJoint acromial_l: socket_parent_frame=torso_offset socket_child_frame=humerus_l_offset
      Coordinate arm_flex_l: default_value=0 range=(-1.570796 1.570796) clamped=true
      Coordinate arm_add_l: default_value=-4.037032e-11 range=(-2.094395 1.570796) clamped=true
      Coordinate arm_rot_l: default_value=0 range=(-1.570796 1.570796) clamped=true
      PhysicalOffsetFrame torso_offset: socket_parent=/bodyset/torso translation=(0.003007995 0.3541902 -0.1652366)
      PhysicalOffsetFrame humerus_l_offset: socket_parent=/bodyset/humerus_l translation=(0 0 0)
      SpatialTransform: axes_held_at_zero=(translation1 translation2 translation3)
        TransformAxis rotation1: coordinates=arm_flex_l axis=(0 0 1) LinearFunction(coefficients=1 0)
        TransformAxis rotation2: coordinates=arm_add_l axis=(-1 0 0) LinearFunction(coefficients=1 0)
        TransformAxis rotation3: coordinates=arm_rot_l axis=(0 -1 0) LinearFunction(coefficients=1 0)
    PinJoint elbow_l: socket_parent_frame=humerus_l_offset socket_child_frame=ulna_l_offset
      Coordinate elbow_flex_l: default_value=2.713875e-5 range=(0 2.618) clamped=true
      PhysicalOffsetFrame humerus_l_offset: socket_parent=/bodyset/humerus_l
          translation=(0.01420549 -0.309392 0.01036988) orientation=(0.0228627 -0.228018 0.0051689)
      PhysicalOffsetFrame ulna_l_offset: socket_parent=/bodyset/ulna_l translation=(0 0 0)
          orientation=(0.0228627 -0.228018 0.0051689)
    PinJoint radioulnar_l: socket_parent_frame=ulna_l_offset socket_child_frame=radius_l_offset
      Coordinate pro_sup_l: default_value=1.570796 range=(0 1.570796) clamped=true locked=true
      PhysicalOffsetFrame ulna_l_offset: socket_parent=/bodyset/ulna_l
          translation=(-0.006798827 -0.01314588 -0.0263615) orientation=(1.56884 -0.056428 1.53614)
      PhysicalOffsetFrame radius_l_offset: socket_parent=/bodyset/radius_l translation=(0 0 0)
          orientation=(1.56884 -0.056428 1.53614)
    UniversalJoint radius_hand_l: socket_parent_frame=radius_l_offset socket_child_frame=hand_l_offset
      Coordinate wrist_flex_l: default_value=0 range=(-1.22173 1.22173) clamped=true locked=true
      Coordinate wrist_dev_l: default_value=0 range=(-0.4363323 0.6108652) clamped=true locked=true
      PhysicalOffsetFrame radius_l_offset: socket_parent=/bodyset/radius_l
          translation=(-0.008890929 -0.2383592 -0.01375532) orientation=(1.5708 0 1.5708)
      PhysicalOffsetFrame hand_l_offset: socket_parent=/bodyset/hand_l translation=(0 0 0)
          orientation=(1.5708 0 1.5708)
  ConstraintSet:
    CoordinateCouplerConstraint patellofemoral_knee_angle_r_con: independent_coordinate_names=knee_angle_r
        dependent_coordinate_name=knee_angle_r_beta scale_factor=1
        coupled_coordinates_function=LinearFunction(coefficients=1 0)
    CoordinateCouplerConstraint patellofemoral_knee_angle_l_con: independent_coordinate_names=knee_angle_l
        dependent_coordinate_name=knee_angle_l_beta scale_factor=1
        coupled_coordinates_function=LinearFunction(coefficients=1 0)
  ForceSet:
    Millard2012EquilibriumMuscle [values shared by the 9 below unless stated]: fiber_damping=0.01
        default_activation=0.01 minimum_activation=0.01
      ActiveForceLengthCurve: min_norm_active_fiber_length=0.25 transition_norm_fiber_length=0.77
          max_norm_active_fiber_length=1.9 shallow_ascending_slope=0.75 minimum_value=0
      ForceVelocityCurve: concentric_slope_at_vmax=0 concentric_slope_near_vmax=0.25 isometric_slope=5
          eccentric_slope_at_vmax=0 eccentric_slope_near_vmax=0.15 max_eccentric_velocity_force_multiplier=1.4
      FiberForceLengthCurve: strain_at_zero_force=0 strain_at_one_norm_force=0.7
      TendonForceLengthCurve
    Millard2012EquilibriumMuscle bflh_r: max_isometric_force=4000 optimal_fiber_length=0.09640964
        tendon_slack_length=0.3212601 pennation_angle_at_optimal=0.1759182 [radians]
      PathPoint P1: pelvis (-0.112028 -0.1282936 0.06312347)
      PathPoint P2: tibia_r (-0.03465684 -0.03599375 0.02601834)
      PathPoint P3: tibia_r (-0.02951488 -0.04679188 0.0311603)
    Millard2012EquilibriumMuscle bfsh_r: max_isometric_force=1000 optimal_fiber_length=0.1100628
        tendon_slack_length=0.1055896 pennation_angle_at_optimal=0.2642232 ignore_tendon_compliance=true
      PathPoint P1: femur_r (0.004956252 -0.209253 0.02319526)
      PathPoint P2: tibia_r (-0.03095463 -0.04308966 0.03270289)
      PathWrap: wrap_object=BF_at_gastroc_r method=hybrid
    Millard2012EquilibriumMuscle gasmed_r: max_isometric_force=4500 optimal_fiber_length=0.05232127
        tendon_slack_length=0.409046 pennation_angle_at_optimal=0.1656816
      PathPoint P1: femur_r (0.007930003 -0.3754856 -0.02061801)
      PathPoint P2: calcn_r (0.004648472 0.0327506 -0.005599296)
      PathWrap shank: wrap_object=GasMed_at_shank_r method=hybrid
      PathWrap condyles: wrap_object=Gastroc_at_condyles_r method=hybrid
    Millard2012EquilibriumMuscle glmax2_r: max_isometric_force=4500 optimal_fiber_length=0.163349
        tendon_slack_length=0.07063245 pennation_angle_at_optimal=0.3673821 ignore_tendon_compliance=true
      PathPoint P1: pelvis (-0.1418662 0.009371573 0.04976628)
      PathPoint P2: pelvis (-0.1447746 -0.06560101 0.08757573)
      PathPoint P3: femur_r (-0.04460627 -0.05788902 0.02497951)
      PathPoint P4: femur_r (-0.01546351 -0.100711 0.04153339)
      PathWrap: wrap_object=Gmax2_at_pelvis_r method=hybrid
    Millard2012EquilibriumMuscle iliacus_r: max_isometric_force=2500 optimal_fiber_length=0.1122719
        tendon_slack_length=0.101235 pennation_angle_at_optimal=0.279914 ignore_tendon_compliance=true
      PathPoint P1: pelvis (-0.06517013 0.03328524 0.09080731)
      PathPoint P2: pelvis (-0.0145421 -0.05999961 0.08143574)
      PathPoint P3: femur_r (-0.002279876 -0.05600565 0.01377838)
      PathPoint P4: femur_r (-0.01209325 -0.06314265 0.01942851)
      PathWrap: wrap_object=IL_at_brim_r method=hybrid range=(2 3)
    Millard2012EquilibriumMuscle recfem_r: max_isometric_force=3000 optimal_fiber_length=0.07597613
        tendon_slack_length=0.4489434 pennation_angle_at_optimal=0.2170149
      PathPoint P1: pelvis (-0.02585262 -0.04179506 0.100502)
      PathPoint P2: patella_r (0.009912504 0.04857127 0.0006938753)
      PathPoint P3: patella_r (0.01199413 0.04331764 -0.0009912504)
      PathPoint P4: patella_r (0.004956252 0.002448388 2.973751e-5)
      PathPoint P5: tibia_r (0.03352561 -0.06491216 -0.0004833447)
      PathWrap: wrap_object=KnExt_at_fem_r method=hybrid
    Millard2012EquilibriumMuscle soleus_r: max_isometric_force=9500 optimal_fiber_length=0.04526136
        tendon_slack_length=0.2846897 pennation_angle_at_optimal=0.3814289
      PathPoint P1: tibia_r (-0.007815786 -0.09420079 0.01007825)
      PathPoint P2: calcn_r (0.004648472 0.0327506 -0.005599296)
    Millard2012EquilibriumMuscle tibant_r: max_isometric_force=2000 optimal_fiber_length=0.07052795
        tendon_slack_length=0.2483049 pennation_angle_at_optimal=0.1951828
      PathPoint P1: tibia_r (0.01583725 -0.1349251 0.01665997)
      PathPoint P2: tibia_r (0.02581266 -0.1960117 0.01316343)
      PathPoint P3: tibia_r (0.02396155 -0.376289 -0.01357479)
      PathPoint P4: calcn_r (0.1231845 0.01880518 -0.03222237)
    Millard2012EquilibriumMuscle vasmed_r: max_isometric_force=9000 optimal_fiber_length=0.09655432
        tendon_slack_length=0.1993969 pennation_angle_at_optimal=0.4222225
      PathPoint P1: femur_r (0.01387751 -0.2080635 0.01863551)
      PathPoint P2: femur_r (0.03528851 -0.2744772 0.0008921253)
      PathPoint P3: patella_r (0.006244877 0.04411064 -0.01685126)
      PathPoint P4: patella_r (0.004956252 0.002448388 -0.008425628)
      PathPoint P5: tibia_r (0.03280573 -0.06537494 -0.006972504)
      PathWrap: wrap_object=KnExt_at_fem_r method=hybrid
    CoordinateActuator lumbar_ext: coordinate=lumbar_extension optimal_force=10
    CoordinateActuator lumbar_bend: coordinate=lumbar_bending optimal_force=10
    CoordinateActuator lumbar_rot: coordinate=lumbar_rotation optimal_force=10
    CoordinateActuator shoulder_flex_r: coordinate=arm_flex_r optimal_force=10
    CoordinateActuator shoulder_add_r: coordinate=arm_add_r optimal_force=10
    CoordinateActuator shoulder_rot_r: coordinate=arm_rot_r optimal_force=10
    CoordinateActuator elbow_flex_r: coordinate=elbow_flex_r optimal_force=10
    CoordinateActuator pro_sup_r: coordinate=pro_sup_r optimal_force=10
    CoordinateActuator wrist_flex_r: coordinate=wrist_flex_r optimal_force=10
    CoordinateActuator wrist_dev_r: coordinate=wrist_dev_r optimal_force=10
    CoordinateActuator shoulder_flex_l: coordinate=arm_flex_l optimal_force=10
    CoordinateActuator shoulder_add_l: coordinate=arm_add_l optimal_force=10
    CoordinateActuator shoulder_rot_l: coordinate=arm_rot_l optimal_force=10
    CoordinateActuator elbow_flex_l: coordinate=elbow_flex_l optimal_force=10
    CoordinateActuator pro_sup_l: coordinate=pro_sup_l optimal_force=10
    CoordinateActuator wrist_flex_l: coordinate=wrist_flex_l optimal_force=10
    CoordinateActuator wrist_dev_l: coordinate=wrist_dev_l optimal_force=10
    ObjectGroup RightLeg: members=(bflh_r bfsh_r gasmed_r glmax2_r iliacus_r recfem_r soleus_r tibant_r vasmed_r)
    ObjectGroup HipFlexorsMissingEMGChannelGroup: members=iliacus_r
    ObjectGroup HipFlexorsActivationGroupR: members=iliacus_r
    ObjectGroup GlutMaxLat: members=glmax2_r
    ObjectGroup GlutmaxActivationGroupR: members=glmax2_r
    ObjectGroup GlutmaxNormalizedFiberLengthGroupR: members=glmax2_r
    ObjectGroup RecFem: members=recfem_r
    ObjectGroup BicFemLong: members=bflh_r
    ObjectGroup BicFemShort: members=bfsh_r
    ObjectGroup HamslatActivationGroupR: members=(bflh_r bfsh_r)
    ObjectGroup HamsNormalizedFiberLengthGroupR: members=bflh_r
    ObjectGroup VastMed: members=vasmed_r
    ObjectGroup VasActivationGroupR: members=vasmed_r
    ObjectGroup VasNormalizedFiberLengthGroupR: members=vasmed_r
    ObjectGroup GasMed: members=gasmed_r
    ObjectGroup GasActivationGroupR: members=gasmed_r
    ObjectGroup GasNormalizedFiberLengthGroupR: members=gasmed_r
    ObjectGroup Sol: members=soleus_r
    ObjectGroup TibAnt: members=tibant_r
  MarkerSet:
    Marker R_Shoulder: torso (-0.007434172 0.3871623 0.1524421)
    Marker L_Shoulder: torso (-0.001197807 0.3846629 -0.160463)
    Marker R_Elbow: humerus_r (0.01833854 -0.3211697 0.03121769)
    Marker L_Elbow: humerus_l (0.01019675 -0.3212787 -0.02890569)
    Marker R_Wrist: radius_r (-0.03930864 -0.2467281 0.004493502)
    Marker L_Wrist: radius_l (-0.03687466 -0.2447528 -0.00885658)
    Marker R_Asis: pelvis (0.01312029 -0.007952426 0.1314857)
    Marker L_Asis: pelvis (0.01533001 -0.01414623 -0.1329859)
    Marker Sacral: pelvis (-0.1577083 0.05278437 0.000695419)
    Marker Sternum: torso (0.09831806 0.3451058 9.012001e-5)
    Marker R_Thigh_Superior: femur_r (0.09290379 -0.1739548 0.03733936)
    Marker R_Thigh_Inferior: femur_r (0.08446841 -0.2852294 0.01685917)
    Marker R_Thigh_Lateral: femur_r (0.005892694 -0.2270376 0.09277655)
    Marker R_Shank_Superior: tibia_r (0.04213539 -0.09341224 0.02995816)
    Marker R_Shank_Inferior: tibia_r (0.03192394 -0.2705098 0.02222617)
    Marker R_Shank_Lateral: tibia_r (-0.03593146 -0.1405177 0.08421387)
    Marker R_Heel: calcn_r (-0.02319094 -0.0007159048 -0.007041624)
    Marker R_Toe: toes_r (0.0894079 0.002819943 -0.001150659)
    Marker R_Midfoot_Superior: calcn_r (0.1493154 0.05847274 0.0002452081)
    Marker R_Midfoot_Lateral: calcn_r (0.06573345 -0.004053628 0.05047234)
    Marker L_Thigh_Superior: femur_l (0.1001369 -0.1505615 -0.03300391)
    Marker L_Thigh_Inferior: femur_l (0.08804978 -0.2770656 -0.01414248)
    Marker L_Thigh_Lateral: femur_l (0.007704042 -0.2251928 -0.08598721)
    Marker L_Shank_Superior: tibia_l (0.0332445 -0.09442731 -0.02787669)
    Marker L_Shank_Inferior: tibia_l (0.02789729 -0.2525241 -0.02289837)
    Marker L_Shank_Lateral: tibia_l (-0.05059004 -0.1581387 -0.07949417)
    Marker L_Heel: calcn_l (-0.02421497 0.00403868 0.007414091)
    Marker L_Toe: toes_l (0.08359067 -0.0008760066 -0.003548896)
    Marker L_Midfoot_Superior: calcn_l (0.1503067 0.05637612 -0.009824905)
    Marker L_Midfoot_Lateral: calcn_l (0.06013316 -0.008206587 -0.0485816)
