# OpenSim document version 40500
InverseKinematicsTool:
  time_range: 0 4
  output_motion_file: GaitTrial48_IKResults.mot
  marker_file: GaitTrial48_markers.trc
  IKTaskSet:
    IKMarkerTask R_Shoulder: apply=true weight=1
    IKMarkerTask L_Shoulder: apply=true weight=1
    IKMarkerTask R_Elbow: apply=true weight=1
    IKMarkerTask L_Elbow: apply=true weight=1
    IKMarkerTask R_Wrist: apply=true weight=1
    IKMarkerTask L_Wrist: apply=true weight=1
    IKMarkerTask R_Asis: apply=true weight=1
    IKMarkerTask L_Asis: apply=true weight=1
    IKMarkerTask Sacral: apply=true weight=1
    IKMarkerTask Sternum: apply=true weight=1
    IKMarkerTask R_Thigh_Superior: apply=true weight=1
    IKMarkerTask R_Thigh_Inferior: apply=true weight=1
    IKMarkerTask R_Thigh_Lateral: apply=true weight=1
    IKMarkerTask R_Shank_Superior: apply=true weight=1
    IKMarkerTask R_Shank_Inferior: apply=true weight=1
    IKMarkerTask R_Shank_Lateral: apply=true weight=1
    IKMarkerTask R_Heel: apply=true weight=1
    IKMarkerTask R_Toe: apply=true weight=1
    IKMarkerTask R_Midfoot_Superior: apply=true weight=1
    IKMarkerTask R_Midfoot_Lateral: apply=true weight=1
    IKMarkerTask L_Thigh_Superior: apply=true weight=1
    IKMarkerTask L_Thigh_Inferior: apply=true weight=1
    IKMarkerTask L_Thigh_Lateral: apply=true weight=1
    IKMarkerTask L_Shank_Superior: apply=true weight=1
    IKMarkerTask L_Shank_Inferior: apply=true weight=1
    IKMarkerTask L_Shank_Lateral: apply=true weight=1
    IKMarkerTask L_Heel: apply=true weight=1
    IKMarkerTask L_Toe: apply=true weight=1
    IKMarkerTask L_Midfoot_Superior: apply=true weight=1
    IKMarkerTask L_Midfoot_Lateral: apply=true weight=1
