# OpenSim document version 40500
AnalyzeTool RCNL_Fullbody_Walking_Model_Reduced_Muscles:
  replace_force_set: false
  results_directory: .\MuscleAnalysis
  output_precision: 8
  initial_time: 0
  final_time: 4
  solve_for_equilibrium_for_auxiliary_states: false
  maximum_number_of_integrator_steps: 20000
  maximum_integrator_step_size: 1
  minimum_integrator_step_size: 1e-8
  integrator_error_tolerance: 1e-5
  coordinates_file: GaitTrial48_IKResults.mot
  lowpass_cutoff_frequency_for_coordinates: 6
  AnalysisSet Analyses:
    MuscleAnalysis: start_time=0 end_time=1.07 step_interval=1 in_degrees=true muscle_list=all
        moment_arm_coordinate_list=all compute_moments=true
