# OpenSim document version 40600
Model:
  Ground
  BodySet:
    Body calcn_r: mass=1.131084 [kg] mass_center=(0.1050119 0.03150357 0)
        inertia=(0.00139698 0.003891587 0.004091155 0 0 0) meshes=r_foot.vtp
    Body toes_r: mass=0.1959943 mass_center=(0.03633412 0.006300715 -0.01837708)
        inertia=(9.978428e-5 0.0001995686 0.0009978428 0 0 0) meshes=r_bofoot.vtp
  JointSet:
    PinJoint mtp_r: socket_parent_frame=calcn_r_offset socket_child_frame=toes_r_offset
      Coordinate mtp_angle_r: default_value=-0.1745329 range=(-0.5235988 0.5235988) clamped=true
      PhysicalOffsetFrame calcn_r_offset: socket_parent=/bodyset/calcn_r
          translation=(0.1877613 -0.002100238 0.001134129) [meters] orientation=(-3.141593 0.619901 0) [radians]
      PhysicalOffsetFrame toes_r_offset: socket_parent=/bodyset/toes_r translation=(0 0 0)
          orientation=(-3.14159 0.619901 0)
    CustomJoint ground_hindfoot: socket_parent_frame=/ground socket_child_frame=/bodyset/calcn_r
      Coordinate Rotation1
      Coordinate Rotation2
      Coordinate Rotation3
      Coordinate Translation1
      Coordinate Translation2: default_value=0.01842465
      Coordinate Translation3
      SpatialTransform:
        TransformAxis rotation1: coordinates=Rotation1 axis=(0 1 0) LinearFunction(coefficients=1 0)
        TransformAxis rotation2: coordinates=Rotation2 axis=(1 0 0) LinearFunction(coefficients=1 0)
        TransformAxis rotation3: coordinates=Rotation3 axis=(0 0 1) LinearFunction(coefficients=1 0)
        TransformAxis translation1: coordinates=Translation1 axis=(1 0 0) LinearFunction(coefficients=1 0)
        TransformAxis translation2: coordinates=Translation2 axis=(0 1 0) LinearFunction(coefficients=1 0)
        TransformAxis translation3: coordinates=Translation3 axis=(0 0 1) LinearFunction(coefficients=1 0)
  MarkerSet:
    Marker R_Heel: calcn_r (-0.02319094 -0.0007159048 -0.007041624)
    Marker R_Toe: toes_r (0.0894079 0.002819943 -0.001150659)
    Marker R_Midfoot_Superior: calcn_r (0.1493154 0.05847274 0.0002452081)
    Marker R_Midfoot_Lateral: calcn_r (0.06573345 -0.004053628 0.05047234)
    Marker R_Toe_Lateral: calcn_r (0.1641444 0.003307997 0.06431303)
    Marker R_Toe_Medial: calcn_r (0.1889583 -0.0021152 -0.04385825)
    Marker spring_marker_1: calcn_r (0.1646042 -0.01842465 -0.04401965)
    Marker spring_marker_2: calcn_r (0.2019711 -0.01842465 -0.04314568)
    Marker spring_marker_3: toes_r (0.05157667 -0.01842465 -0.04340583)
    Marker spring_marker_4: calcn_r (0.01450042 -0.01842465 -0.02031179)
    Marker spring_marker_5: calcn_r (0.0518673 -0.01842465 -0.01943782)
    Marker spring_marker_6: calcn_r (0.08923418 -0.01842465 -0.01856385)
    Marker spring_marker_7: calcn_r (0.1266011 -0.01842465 -0.01768988)
    Marker spring_marker_8: calcn_r (0.1639679 -0.01842465 -0.01681591)
    Marker spring_marker_9: toes_r (0.01357353 -0.01842465 -0.01707606)
    Marker spring_marker_10: toes_r (0.05094041 -0.01842465 -0.01620209)
    Marker spring_marker_11: calcn_r (0.01386415 -0.01842465 0.006891955)
    Marker spring_marker_12: calcn_r (0.05123103 -0.01842465 0.007765925)
    Marker spring_marker_13: calcn_r (0.08859792 -0.01842465 0.008639895)
    Marker spring_marker_14: calcn_r (0.1259648 -0.01842465 0.009513866)
    Marker spring_marker_15: calcn_r (0.1633317 -0.01842465 0.01038784)
    Marker spring_marker_16: toes_r (0.01293726 -0.01842465 0.01012768)
    Marker spring_marker_17: toes_r (0.05030414 -0.01842465 0.01100165)
    Marker spring_marker_18: calcn_r (0.01322789 -0.01842465 0.0340957)
    Marker spring_marker_19: calcn_r (0.05059477 -0.01842465 0.03496967)
    Marker spring_marker_20: calcn_r (0.08796165 -0.01842465 0.03584364)
    Marker spring_marker_21: calcn_r (0.1253285 -0.01842465 0.03671761)
    Marker spring_marker_22: toes_r (-0.02506589 -0.01842465 0.03645745)
    Marker spring_marker_23: toes_r (0.012301 -0.01842465 0.03733142)
    Marker spring_marker_24: toes_r (0.04966788 -0.01842465 0.03820539)
