# OpenSim document version 40000
Model:
  Ground
  BodySet:
    Body femur_r: mass=8.416534 [kg] mass_center=(0 -0.1685126 0) inertia=(0.1190508 0.03120749 0.1255412 0 0 0)
        meshes=r_femur.vtp
      WrapCylinder Gastroc_at_condyles_r: translation=(0.004956252 -0.4064126 0) quadrant=all radius=0.02478126
          length=0.09912504
      WrapCylinder KnExt_at_fem_r: xyz_body_rotation=(-0.0623366 0.0507601 0)
          translation=(0.003556884 -0.3992082 0.002072814) quadrant=all radius=0.02478126 length=0.09912504
      WrapCylinder AB_at_femshaft_r: xyz_body_rotation=(1.66157 0.186644 0)
          translation=(0.01451528 -0.1116098 0.02316056) quadrant=all radius=0.01635563 length=0.06938753
      WrapCylinder AL_at_femshaft_r: xyz_body_rotation=(1.77711 0.136489 0)
          translation=(0.0304638 -0.2298799 0.01498146) quadrant=all radius=0.01992413 length=0.09912504
      WrapCylinder AMprox_at_femshaft_r: xyz_body_rotation=(1.61126 0.18656 0)
          translation=(0.005137641 -0.072257 0.02518073) quadrant=all radius=0.02091538 length=0.06938753
      WrapCylinder AMmid_at_femshaft_r: xyz_body_rotation=(1.61139 0.13656 0)
          translation=(0.02281115 -0.1593048 0.0204041) quadrant=all radius=0.02121276 length=0.11895
      WrapCylinder AMdist_at_femshaft_r: xyz_body_rotation=(1.71188 0.186636 0)
          translation=(0.03132995 -0.2584547 0.009282663) quadrant=all radius=0.02160926 length=0.1982501
      WrapCylinder AMisch_at_condyles_r: xyz_body_rotation=(1.71115 -0.463363 0)
          translation=(-0.02245291 -0.3735339 -0.00312677) quadrant=all radius=0.03965001 length=0.2379001
      WrapCylinder PECT_at_femshaft_r: xyz_body_rotation=(1.81295 0.276344 0)
          translation=(0.006032482 -0.08376353 0.03017416) quadrant=all radius=0.01486876 length=0.04956252
    Body tibia_r: mass=3.354796 mass_center=(0 -0.192001 0) inertia=(0.04823182 0.004880601 0.04890171 0 0 0)
        meshes=(r_tibia.vtp r_fibula.vtp)
      WrapCylinder GasLat_at_shank_r: xyz_body_rotation=(2.96723 -0.279725 -1.47812)
          translation=(-0.007610107 -0.07610107 -0.003393697) quadrant=-y radius=0.05656161 length=0.1028393
      WrapCylinder GasMed_at_shank_r: xyz_body_rotation=(2.96723 0.0279725 -1.47812)
          translation=(-0.007610107 -0.07610107 -0.003393697) quadrant=-y radius=0.05656161 length=0.1028393
      WrapCylinder GR_at_condyles_r: xyz_body_rotation=(0 -0.4 0) translation=(-0.003085179 -0.02056786 0) quadrant=all
          radius=0.03702214 length=0.1028393
      WrapCylinder SM_at_condyles_r: xyz_body_rotation=(0 -0.1 0) translation=(-0.001028393 -0.02056786 0) quadrant=all
          radius=0.03619943 length=0.1028393
      WrapCylinder ST_at_condyles_r: xyz_body_rotation=(0 -0.2 0) translation=(-0.002056786 -0.02108205 0) quadrant=all
          radius=0.0437067 length=0.1028393
      WrapCylinder BF_at_gastroc_r: translation=(-0.05964679 -0.06170357 0) quadrant=y radius=0.03085179
          length=0.1542589
    Body pretalus_r: mass=9.048675e-9 mass_center=(0 0 0) inertia=(9.048675e-9 9.048675e-9 9.048675e-9 0 0 0)
    Body talus_r: mass=0.09048675 mass_center=(0 0 0) inertia=(0.0009978428 0.0009978428 0.0009978428 0 0 0)
        meshes=r_talus.stl
    Body calcn_r: mass=1.131084 mass_center=(0.1050119 0.03150357 0) inertia=(0.00139698 0.003891587 0.004091155 0 0 0)
        meshes=r_foot.vtp
  JointSet:
    WeldJoint FemurGround: socket_parent_frame=/ground socket_child_frame=/bodyset/femur_r
    CustomJoint knee_r: socket_parent_frame=femur_r_offset socket_child_frame=tibia_r_offset
      Coordinate knee_angle_r: default_value=0 range=(0 2.0944) clamped=true
      PhysicalOffsetFrame femur_r_offset: socket_parent=/bodyset/femur_r
          translation=(-0.008019215 -0.4043905 -0.002725939) [meters]
          orientation=(-0.126694 0.003907073 0.1246163) [radians]
      PhysicalOffsetFrame tibia_r_offset: socket_parent=/bodyset/tibia_r
          translation=(-0.008319226 -0.003635163 -0.001526896) orientation=(-0.08982122 0.02484605 0.1246163)
      SpatialTransform: axes_held_at_zero=(rotation2 translation3)
        TransformAxis rotation1: coordinates=knee_angle_r axis=(0 0 -1) LinearFunction(coefficients=1 0)
        TransformAxis rotation3: coordinates=knee_angle_r axis=(0 1 0)
          SimmSpline: x=(0 0.174533 0.349066 0.523599 0.698132 0.872665 1.0472 1.22173 1.39626 1.5708 1.74533 1.91986 2.0944)
              y=(0 0.059461 0.109399 0.150618 0.18392 0.210107 0.229983 0.24435 0.254012 0.25977 0.262428 0.262788 0.261654)
        TransformAxis translation1: coordinates=knee_angle_r axis=(0 1 0)
          MultiplierFunction: scale=0.9912504
            SimmSpline: x=(0 0.174533 0.349066 0.523599 0.698132 0.872665 1.0472 1.22173 1.39626 1.5708 1.74533 1.91986 2.0944)
                y=(0 0.000479 0.000835 0.001086 0.001251 0.001346 0.001391 0.001403 0.0014 0.0014 0.001421 0.001481 0.001599)
        TransformAxis translation2: coordinates=knee_angle_r axis=(1 0 0)
          MultiplierFunction: scale=0.9912504
            SimmSpline: x=(0 0.174533 0.349066 0.523599 0.698132 0.872665 1.0472 1.22173 1.39626 1.5708 1.74533 1.91986 2.0944)
                y=(0 0.000988 0.001899 0.002734 0.003492 0.004173 0.004777 0.005305 0.005756 0.00613 0.006427 0.006648 0.006792)
    PinJoint ankle_r: socket_parent_frame=tibia_r_offset socket_child_frame=pretalus_r_offset
      Coordinate ankle_angle_r: default_value=0 range=(-0.6981317 0.5235988) clamped=false
      PhysicalOffsetFrame tibia_r_offset: socket_parent=/bodyset/tibia_r translation=(-0.01028393 -0.3959313 0)
          orientation=(0.175895 -0.105208 0)
      PhysicalOffsetFrame pretalus_r_offset: socket_parent=/bodyset/pretalus_r translation=(0 0.015 0)
    WeldJoint pretalar_r: socket_parent_frame=pretalus_r_offset socket_child_frame=talus_r_offset
      PhysicalOffsetFrame pretalus_r_offset: socket_parent=/bodyset/pretalus_r translation=(0 0 0)
          orientation=(0 0 0.6951304)
      PhysicalOffsetFrame talus_r_offset: socket_parent=/bodyset/talus_r translation=(0 0 0)
    CustomJoint subtalar_r: socket_parent_frame=talus_r_offset socket_child_frame=calcn_r_offset
      Coordinate subtalar_angle_r: default_value=0 range=(-0.1745 0.5236) clamped=false
      PhysicalOffsetFrame talus_r_offset: socket_parent=/bodyset/talus_r translation=(0 -0.01798854 0.001464916)
          orientation=(0 0.350105 0)
      PhysicalOffsetFrame calcn_r_offset: socket_parent=/bodyset/calcn_r
          translation=(0.06220381 0.02983073 -0.009743005) orientation=(0 0.200586 0.682645)
      SpatialTransform: axes_held_at_zero=(rotation2 rotation3 translation1 translation2 translation3)
        TransformAxis rotation1: coordinates=subtalar_angle_r axis=(1 0 0) LinearFunction(coefficients=1 0)
