# OpenSim document version 40000
NeuralControlPersonalizationTool:
  results_directory: ncpResults
  input_osimx_file: ncpResults/RightLegAndPelvisKneeNoAdd_ncp_ncp.osimx
  input_model_file: RightLegAndPelvisKneeNoAddMuscles.osim
  data_directory: preprocessed
  coordinate_list: hip_flexion_r hip_adduction_r hip_rotation_r knee_angle_r ankle_angle_r subtalar_angle_r mtp_angle_r
  v_max_factor: 10
  activation_muscle_groups: HamslatActivationGroupR VasActivationGroupR GasActivationGroupR GlutmaxActivationGroupR HipFlexorsActivationGroupR RecFem Sol TibAnt
  normalized_fiber_length_muscle_groups: HipFlexors GlutMaxLat RecFem HamsNormalizedFiberLengthGroupR BicFemShort VasNormalizedFiberLengthGroupR GasNormalizedFiberLengthGroupR Sol TibAnt
  diff_min_change: 1e-6
  step_tolerance: 1e-6
  optimality_tolerance: 1e-3
  function_tolerance: 1e-6
  max_iterations: 1e3
  max_function_evaluations: 1e6
  mtp_results_directory: mtpResults
  # MTP AND NCP SHARED SETTINGS
  MuscleTendonLengthInitialization: is_enabled=false max_normalized_muscle_fiber_length=1
      min_normalized_muscle_fiber_length=0.6 optimize_maximum_muscle_stress=true optimize_isometric_max_force=true
      maximum_muscle_stress=610e3
    RCNLCostTermSet:
      RCNLCostTerm: type=passive_joint_moment is_enabled=false max_allowable_error=2
      RCNLCostTerm: type=optimal_muscle_fiber_length is_enabled=true max_allowable_error=0.3 error_center=1
      RCNLCostTerm: type=tendon_slack_length is_enabled=true max_allowable_error=1 error_center=1
      RCNLCostTerm: type=minimum_normalized_muscle_fiber_length is_enabled=true max_allowable_error=0.3
      RCNLCostTerm: type=maximum_normalized_muscle_fiber_length is_enabled=true max_allowable_error=0.03
      RCNLCostTerm: type=maximum_muscle_stress is_enabled=true max_allowable_error=0.1 error_center=1.2
      RCNLCostTerm: type=passive_muscle_force is_enabled=true max_allowable_error=0.1
      RCNLCostTerm: type=grouped_normalized_muscle_fiber_length is_enabled=true max_allowable_error=0.1
      RCNLCostTerm: type=grouped_maximum_normalized_muscle_fiber_length is_enabled=true max_allowable_error=0.1
  # END OF MTP AND NCP SHARED SETTINGS
  RCNLSynergySet:
    RCNLSynergy: muscle_group_name=RightLeg num_synergies=3
  RCNLCostTermSet:
    RCNLCostTerm: type=moment_tracking is_enabled=true max_allowable_error=10
    RCNLCostTerm: type=activation_tracking is_enabled=true max_allowable_error=0.1
    RCNLCostTerm: type=activation_minimization is_enabled=true max_allowable_error=10
    RCNLCostTerm: type=grouped_activations is_enabled=true max_allowable_error=10
    RCNLCostTerm: type=grouped_fiber_lengths is_enabled=true max_allowable_error=10
    RCNLCostTerm: type=bilateral_symmetry is_enabled=false max_allowable_error=1e-3
