# OpenSim document version 40000
Model UF_Subject_3_v2:
  gravity: 0 -9.80665 0
  length_units: meters
  force_units: N
  credits:
    Rice Computational Neuromechanics Lab (RCNL): B.J. Fregly, Marleny M. Vega, Claire V. Hammond, Mohammad S. Shourijeh, Di Ao, Spencer T. Williams, Geng Li, and Ayman W. Habib. This model was created for use in the RCNL Neuromusculoskeletal Modeling Pipeline software.
  publications:
    This full-body model is a modified version of the one provided with the following publication: Rajagopal, Apoorva, et al. "Full-Body Musculoskeletal Model for Muscle-Driven Simulation of Human Gait." IEEE Transactions on Biomedical Engineering 63.10 (2016): 2068-2079. (2016)
  Ground
  BodySet:
    Body pelvis: mass=10.65662 [kg] mass_center=(-0.07936962 0 0) inertia=(0.1172325 0.09932829 0.06602879 0 0 0)
        meshes=(r_pelvis.vtp l_pelvis.vtp sacrum.vtp)
      WrapCylinder Gmax1_at_pelvis_r: xyz_body_rotation=(-0.6 0.45 0) translation=(-0.08644217 -0.1111399 0.06848016)
          quadrant=-x radius=0.04490502 length=0.1683938
      WrapCylinder Gmax2_at_pelvis_r: xyz_body_rotation=(-0.75 0.39 0) translation=(-0.08981004 -0.09317792 0.07633854)
          quadrant=all radius=0.04490502 length=0.1122626
      WrapCylinder Gmax3_at_pelvis_r: xyz_body_rotation=(-0.1 0 0) translation=(-0.09317792 -0.09879105 0.07633854)
          quadrant=all radius=0.04490502 length=0.1122626
      WrapCylinder Gmax1_at_pelvis_l: xyz_body_rotation=(0.6 -0.45 0) translation=(-0.08644217 -0.1111399 -0.06848016)
          quadrant=-x radius=0.04490502 length=0.1683938
      WrapCylinder Gmax2_at_pelvis_l: xyz_body_rotation=(0.75 -0.39 0)
          translation=(-0.08981004 -0.09317792 -0.07633854) quadrant=all radius=0.04490502 length=0.1122626
      WrapCylinder Gmax3_at_pelvis_l: xyz_body_rotation=(0.1 0 0) translation=(-0.09317792 -0.09879105 -0.07633854)
          quadrant=all radius=0.04490502 length=0.1122626
      WrapCylinder PS_at_brim_r: xyz_body_rotation=(-0.25 -0.27 0.1) translation=(-0.08307429 -0.06735753 0.07364423)
          quadrant=-y radius=0.05613128 length=0.1122626
      WrapCylinder PS_at_brim_l: xyz_body_rotation=(0.25 0.27 0.1) translation=(-0.08307429 -0.06735753 -0.07364423)
          quadrant=-y radius=0.05613128 length=0.1122626
      WrapCylinder IL_at_brim_r: xyz_body_rotation=(-0.32 -0.24 0.9) translation=(-0.07970641 -0.07297066 0.08487049)
          quadrant=-y radius=0.06163214 length=0.1122626
      WrapCylinder IL_at_brim_l: xyz_body_rotation=(0.32 0.24 0.9) translation=(-0.07970641 -0.07297066 -0.08487049)
          quadrant=-y radius=0.06163214 length=0.1122626
    Body femur_r: mass=8.416534 mass_center=(0 -0.1685126 0) inertia=(0.1190508 0.03120749 0.1255412 0 0 0)
        meshes=r_femur.vtp
      WrapCylinder Gastroc_at_condyles_r: translation=(0.004956252 -0.4064126 0) quadrant=all radius=0.02478126
          length=0.09912504
      WrapCylinder KnExt_at_fem_r: xyz_body_rotation=(-0.0623366 0.0507601 0)
          translation=(0.003556884 -0.3992082 0.002072814) quadrant=all radius=0.02478126 length=0.09912504
      WrapCylinder AB_at_femshaft_r: xyz_body_rotation=(1.66157 0.186644 0)
          translation=(0.01451528 -0.1116098 0.02316056) quadrant=all radius=0.01635563 length=0.06938753
      WrapCylinder AL_at_femshaft_r: xyz_body_rotation=(1.77711 0.136489 0)
          translation=(0.0304638 -0.2298799 0.01498146) quadrant=all radius=0.01992413 length=0.09912504
      WrapCylinder AMprox_at_femshaft_r: xyz_body_rotation=(1.61126 0.18656 0)
          translation=(0.005137641 -0.072257 0.02518073) quadrant=all radius=0.02091538 length=0.06938753
      WrapCylinder AMmid_at_femshaft_r: xyz_body_rotation=(1.61139 0.13656 0)
          translation=(0.02281115 -0.1593048 0.0204041) quadrant=all radius=0.02121276 length=0.11895
      WrapCylinder AMdist_at_femshaft_r: xyz_body_rotation=(1.71188 0.186636 0)
          translation=(0.03132995 -0.2584547 0.009282663) quadrant=all radius=0.02160926 length=0.1982501
      WrapCylinder AMisch_at_condyles_r: xyz_body_rotation=(1.71115 -0.463363 0)
          translation=(-0.02245291 -0.3735339 -0.00312677) quadrant=all radius=0.03965001 length=0.2379001
      WrapCylinder PECT_at_femshaft_r: xyz_body_rotation=(1.81295 0.276344 0)
          translation=(0.006032482 -0.08376353 0.03017416) quadrant=all radius=0.01486876 length=0.04956252
    Body patella_r: mass=0.07799958 mass_center=(0.001784251 0.02616901 0)
        inertia=(2.551723e-6 1.165613e-5 1.165613e-5 0 0 0) meshes=r_patella.vtp
    Body tibia_r: mass=3.354796 mass_center=(0 -0.192001 0) inertia=(0.04823182 0.004880601 0.04890171 0 0 0)
        meshes=(r_tibia.vtp r_fibula.vtp)
      WrapCylinder GasLat_at_shank_r: xyz_body_rotation=(2.96723 -0.279725 -1.47812)
          translation=(-0.007610107 -0.07610107 -0.003393697) quadrant=-y radius=0.05656161 length=0.1028393
      WrapCylinder GasMed_at_shank_r: xyz_body_rotation=(2.96723 0.0279725 -1.47812)
          translation=(-0.007610107 -0.07610107 -0.003393697) quadrant=-y radius=0.05656161 length=0.1028393
      WrapCylinder GR_at_condyles_r: xyz_body_rotation=(0 -0.4 0) translation=(-0.003085179 -0.02056786 0) quadrant=all
          radius=0.03702214 length=0.1028393
      WrapCylinder SM_at_condyles_r: xyz_body_rotation=(0 -0.1 0) translation=(-0.001028393 -0.02056786 0) quadrant=all
          radius=0.03619943 length=0.1028393
      WrapCylinder ST_at_condyles_r: xyz_body_rotation=(0 -0.2 0) translation=(-0.002056786 -0.02108205 0) quadrant=all
          radius=0.0437067 length=0.1028393
      WrapCylinder BF_at_gastroc_r: translation=(-0.05964679 -0.06170357 0) quadrant=y radius=0.03085179
          length=0.1542589
    Body pretalus_r: mass=9.048675e-9 mass_center=(0 0 0) inertia=(9.048675e-9 9.048675e-9 9.048675e-9 0 0 0)
    Body talus_r: mass=0.09048675 mass_center=(0 0 0) inertia=(0.0009978428 0.0009978428 0.0009978428 0 0 0)
        meshes=r_talus.stl
    Body calcn_r: mass=1.131084 mass_center=(0.1050119 0.03150357 0) inertia=(0.00139698 0.003891587 0.004091155 0 0 0)
        meshes=r_foot.vtp
    Body toes_r: mass=0.1959943 mass_center=(0.03633412 0.006300715 -0.01837708)
        inertia=(9.978428e-5 0.0001995686 0.0009978428 0 0 0) meshes=r_bofoot.vtp
  JointSet:
    CustomJoint ground_pelvis: socket_parent_frame=ground_offset socket_child_frame=pelvis_offset
      Coordinate pelvis_tilt: default_value=0 range=(-1.570796 1.570796) clamped=false
      Coordinate pelvis_list: default_value=0 range=(-1.570796 1.570796) clamped=false
      Coordinate pelvis_rotation: default_value=0 range=(-1.570796 1.570796) clamped=false
      Coordinate pelvis_tx: default_value=0 range=(-5 5) clamped=false
      Coordinate pelvis_ty: default_value=0.94 range=(-1 2) clamped=false
      Coordinate pelvis_tz: default_value=0 range=(-3 3) clamped=false
      PhysicalOffsetFrame ground_offset: socket_parent=/ground translation=(0 0 0) [meters]
      PhysicalOffsetFrame pelvis_offset: socket_parent=/bodyset/pelvis translation=(0 0 0)
      SpatialTransform:
        TransformAxis rotation1: coordinates=pelvis_tilt axis=(0 0 1) LinearFunction(coefficients=1 0)
        TransformAxis rotation2: coordinates=pelvis_list axis=(1 0 0) LinearFunction(coefficients=1 0)
        TransformAxis rotation3: coordinates=pelvis_rotation axis=(0 1 0) LinearFunction(coefficients=1 0)
        TransformAxis translation1: coordinates=pelvis_tx axis=(1 0 0) LinearFunction(coefficients=1 0)
        TransformAxis translation2: coordinates=pelvis_ty axis=(0 1 0) LinearFunction(coefficients=1 0)
        TransformAxis translation3: coordinates=pelvis_tz axis=(0 0 1) LinearFunction(coefficients=1 0)
    CustomJoint hip_r: socket_parent_frame=pelvis_offset socket_child_frame=femur_r_offset
      Coordinate hip_flexion_r: default_value=0 range=(-0.5235988 2.094395) clamped=false
      Coordinate hip_adduction_r: default_value=0 range=(-0.8726646 0.5235988) clamped=false
      Coordinate hip_rotation_r: default_value=0 range=(-0.6981317 0.6981317) clamped=false
      PhysicalOffsetFrame pelvis_offset: socket_parent=/bodyset/pelvis translation=(-0.06317687 -0.08811488 0.08673405)
      PhysicalOffsetFrame femur_r_offset: socket_parent=/bodyset/femur_r translation=(0 0 0)
      SpatialTransform: axes_held_at_zero=(translation1 translation2 translation3)
        TransformAxis rotation1: coordinates=hip_flexion_r axis=(0 0 1) LinearFunction(coefficients=1 0)
        TransformAxis rotation2: coordinates=hip_adduction_r axis=(1 0 0) LinearFunction(coefficients=1 0)
        TransformAxis rotation3: coordinates=hip_rotation_r axis=(0 1 0) LinearFunction(coefficients=1 0)
    CustomJoint knee_r: socket_parent_frame=femur_r_offset socket_child_frame=tibia_r_offset
      Coordinate knee_angle_r: default_value=0 range=(0 2.0944) clamped=true
      Coordinate knee_adduction_r: default_value=0.1041598 range=(-1 1) clamped=true locked=true
      PhysicalOffsetFrame femur_r_offset: socket_parent=/bodyset/femur_r
          translation=(-0.008019215 -0.4043905 -0.002725939) orientation=(-0.07343992 0.005474887 0.1246163) [radians]
      PhysicalOffsetFrame tibia_r_offset: socket_parent=/bodyset/tibia_r
          translation=(-0.008319226 -0.003635163 -0.001526896) orientation=(-0.06353724 0.001721436 0.1246163)
      SpatialTransform: axes_held_at_zero=translation3
        TransformAxis rotation1: coordinates=knee_angle_r axis=(0 0 -1) LinearFunction(coefficients=1 0)
        TransformAxis rotation2: coordinates=knee_adduction_r axis=(1 0 0) LinearFunction(coefficients=1 0)
        TransformAxis rotation3: coordinates=knee_angle_r axis=(0 1 0)
          SimmSpline: x=(0 0.174533 0.349066 0.523599 0.698132 0.872665 1.0472 1.22173 1.39626 1.5708 1.74533 1.91986 2.0944)
              y=(0 0.059461 0.109399 0.150618 0.18392 0.210107 0.229983 0.24435 0.254012 0.25977 0.262428 0.262788 0.261654)
        TransformAxis translation1: coordinates=knee_angle_r axis=(0 1 0)
          MultiplierFunction: scale=0.9912504
            SimmSpline: x=(0 0.174533 0.349066 0.523599 0.698132 0.872665 1.0472 1.22173 1.39626 1.5708 1.74533 1.91986 2.0944)
                y=(0 0.000479 0.000835 0.001086 0.001251 0.001346 0.001391 0.001403 0.0014 0.0014 0.001421 0.001481 0.001599)
        TransformAxis translation2: coordinates=knee_angle_r axis=(1 0 0)
          MultiplierFunction: scale=0.9912504
            SimmSpline: x=(0 0.174533 0.349066 0.523599 0.698132 0.872665 1.0472 1.22173 1.39626 1.5708 1.74533 1.91986 2.0944)
                y=(0 0.000988 0.001899 0.002734 0.003492 0.004173 0.004777 0.005305 0.005756 0.00613 0.006427 0.006648 0.006792)
    CustomJoint patellofemoral_r: socket_parent_frame=femur_r_offset socket_child_frame=patella_r_offset
      Coordinate knee_angle_r_beta: default_value=0 range=(-99999.9 99999.9) clamped=false
      PhysicalOffsetFrame femur_r_offset: socket_parent=/bodyset/femur_r
          translation=(-0.008019215 -0.4043905 -0.002725939)
      PhysicalOffsetFrame patella_r_offset: socket_parent=/bodyset/patella_r translation=(0 0 0)
      SpatialTransform: axes_held_at_zero=(rotation2 rotation3)
        TransformAxis rotation1: coordinates=knee_angle_r_beta axis=(0 0 1)
          SimmSpline: x=(0 0.174533 0.349066 0.523599 0.698132 0.872665 1.0472 1.22173 1.39626 1.5708 1.74533 1.91986 2.0944)
              y=(0.00113686 -0.00629212 -0.105582 -0.253683 -0.414245 -0.579047 -0.747244 -0.91799 -1.09044 -1.26379 -1.43763 -1.61186 -1.78634)
        TransformAxis translation1: coordinates=knee_angle_r_beta axis=(1 0 0)
          MultiplierFunction: scale=0.9912504
            SimmSpline: x=(0 0.174533 0.349066 0.523599 0.698132 0.872665 1.0472 1.22173 1.39626 1.5708 1.74533 1.91986 2.0944)
                y=(0.0524 0.0488 0.0437 0.0371 0.0296 0.0216 0.0136 0.0057 -0.0019 -0.0088 -0.0148 -0.0196 -0.0227)
        TransformAxis translation2: coordinates=knee_angle_r_beta axis=(0 1 0)
          MultiplierFunction: scale=0.9912504
            SimmSpline: x=(0 0.174533 0.349066 0.523599 0.698132 0.872665 1.0472 1.22173 1.39626 1.5708 1.74533 1.91986 2.0944)
                y=(-0.0108 -0.019 -0.0263 -0.0322 -0.0367 -0.0395 -0.0408 -0.0404 -0.0384 -0.0349 -0.0301 -0.0245 -0.0187)
        TransformAxis translation3: axis=(0 0 1) MultiplierFunction(scale=0.9912504, Constant(value=0.00275))
    PinJoint ankle_r: socket_parent_frame=tibia_r_offset socket_child_frame=pretalus_r_offset
      Coordinate ankle_angle_r: default_value=0 range=(-0.6981317 0.5235988) clamped=false
      PhysicalOffsetFrame tibia_r_offset: socket_parent=/bodyset/tibia_r translation=(-0.01028393 -0.3959313 0)
          orientation=(0.175895 -0.105208 0)
      PhysicalOffsetFrame pretalus_r_offset: socket_parent=/bodyset/pretalus_r translation=(0 0.015 0)
    WeldJoint pretalar_r: socket_parent_frame=pretalus_r_offset socket_child_frame=talus_r_offset
      PhysicalOffsetFrame pretalus_r_offset: socket_parent=/bodyset/pretalus_r translation=(0 0 0)
          orientation=(0 0 0.6951304)
      PhysicalOffsetFrame talus_r_offset: socket_parent=/bodyset/talus_r translation=(0 0 0)
    CustomJoint subtalar_r: socket_parent_frame=talus_r_offset socket_child_frame=calcn_r_offset
      Coordinate subtalar_angle_r: default_value=0 range=(-0.1745 0.5236) clamped=false
      PhysicalOffsetFrame talus_r_offset: socket_parent=/bodyset/talus_r translation=(0 -0.01798854 0.001464916)
          orientation=(0 0.350105 0)
      PhysicalOffsetFrame calcn_r_offset: socket_parent=/bodyset/calcn_r
          translation=(0.06220381 0.02983073 -0.009743005) orientation=(0 0.200586 0.682645)
      SpatialTransform: axes_held_at_zero=(rotation2 rotation3 translation1 translation2 translation3)
        TransformAxis rotation1: coordinates=subtalar_angle_r axis=(1 0 0) LinearFunction(coefficients=1 0)
    PinJoint mtp_r: socket_parent_frame=calcn_r_offset socket_child_frame=toes_r_offset
      Coordinate mtp_angle_r: default_value=-0.1745329 range=(-0.5235988 0.5235988) clamped=true
      PhysicalOffsetFrame calcn_r_offset: socket_parent=/bodyset/calcn_r
          translation=(0.1877613 -0.002100238 0.001134129) orientation=(-3.141593 0.619901 0)
      PhysicalOffsetFrame toes_r_offset: socket_parent=/bodyset/toes_r translation=(0 0 0)
          orientation=(-3.14159 0.619901 0)
  ConstraintSet:
    CoordinateCouplerConstraint patellofemoral_knee_angle_r_con: independent_coordinate_names=knee_angle_r
        dependent_coordinate_name=knee_angle_r_beta scale_factor=1
        coupled_coordinates_function=LinearFunction(coefficients=1 0)
  MarkerSet:
    Marker R_Asis: pelvis (0.01312029 0.005604633 0.1314857)
    Marker L_Asis: pelvis (0.01533001 -0.006278964 -0.1329859)
    Marker Sacral: pelvis (-0.1577083 0.04156391 0.000695419)
    Marker R_Thigh_Superior: femur_r (0.1018304 -0.1718483 0.0309208)
    Marker R_Thigh_Inferior: femur_r (0.07445669 -0.2842341 0.0113797)
    Marker R_Thigh_Lateral: femur_r (0.01091432 -0.219524 0.08479532)
    Marker R_Shank_Superior: tibia_r (0.02957033 -0.08414835 0.02995816)
    Marker R_Shank_Inferior: tibia_r (0.02899959 -0.2612816 0.02222617)
    Marker R_Shank_Lateral: tibia_r (-0.04681188 -0.1337335 0.08421387)
    Marker R_Heel: calcn_r (-0.02319094 -0.0007159048 -0.007041624)
    Marker R_Toe: toes_r (0.0894079 0.002819943 -0.001150659)
    Marker R_Midfoot_Superior: calcn_r (0.1493154 0.05847274 0.0002452081)
    Marker R_Midfoot_Lateral: calcn_r (0.06573345 -0.004053628 0.05047234)
