# OpenSim document version 40000
Model:
  Ground
  BodySet:
    Body tibia_r: mass=3.354796 [kg] mass_center=(0 -0.192001 0) inertia=(0.04823182 0.004880601 0.04890171 0 0 0)
        meshes=(r_tibia.vtp r_fibula.vtp)
      WrapCylinder GasLat_at_shank_r: xyz_body_rotation=(2.96723 -0.279725 -1.47812)
          translation=(-0.007610107 -0.07610107 -0.003393697) quadrant=-y radius=0.05656161 length=0.1028393
      WrapCylinder GasMed_at_shank_r: xyz_body_rotation=(2.96723 0.0279725 -1.47812)
          translation=(-0.007610107 -0.07610107 -0.003393697) quadrant=-y radius=0.05656161 length=0.1028393
      WrapCylinder GR_at_condyles_r: xyz_body_rotation=(0 -0.4 0) translation=(-0.003085179 -0.02056786 0) quadrant=all
          radius=0.03702214 length=0.1028393
      WrapCylinder SM_at_condyles_r: xyz_body_rotation=(0 -0.1 0) translation=(-0.001028393 -0.02056786 0) quadrant=all
          radius=0.03619943 length=0.1028393
      WrapCylinder ST_at_condyles_r: xyz_body_rotation=(0 -0.2 0) translation=(-0.002056786 -0.02108205 0) quadrant=all
          radius=0.0437067 length=0.1028393
      WrapCylinder BF_at_gastroc_r: translation=(-0.05964679 -0.06170357 0) quadrant=y radius=0.03085179
          length=0.1542589
    Body pretalus_r: mass=9.048675e-9 mass_center=(0 0 0) inertia=(9.048675e-9 9.048675e-9 9.048675e-9 0 0 0)
    Body talus_r: mass=0.09048675 mass_center=(0 0 0) inertia=(0.0009978428 0.0009978428 0.0009978428 0 0 0)
        meshes=r_talus.stl
    Body calcn_r: mass=1.131084 mass_center=(0.1050119 0.03150357 0) inertia=(0.00139698 0.003891587 0.004091155 0 0 0)
        meshes=r_foot.vtp
  JointSet:
    WeldJoint TibiaGround: socket_parent_frame=/ground socket_child_frame=/bodyset/tibia_r
    PinJoint ankle_r: socket_parent_frame=tibia_r_offset socket_child_frame=pretalus_r_offset
      Coordinate ankle_angle_r: default_value=0 range=(-0.6981317 0.5235988) clamped=false
      PhysicalOffsetFrame tibia_r_offset: socket_parent=/bodyset/tibia_r
          translation=(-0.01028393 -0.3959313 0) [meters] orientation=(0.175895 -0.105208 0) [radians]
      PhysicalOffsetFrame pretalus_r_offset: socket_parent=/bodyset/pretalus_r translation=(0 0.015 0)
    WeldJoint pretalar_r: socket_parent_frame=pretalus_r_offset socket_child_frame=talus_r_offset
      PhysicalOffsetFrame pretalus_r_offset: socket_parent=/bodyset/pretalus_r translation=(0 0 0)
          orientation=(0 0 0.6951304)
      PhysicalOffsetFrame talus_r_offset: socket_parent=/bodyset/talus_r translation=(0 0 0)
    CustomJoint subtalar_r: socket_parent_frame=talus_r_offset socket_child_frame=calcn_r_offset
      Coordinate subtalar_angle_r: default_value=0 range=(-0.1745 0.5236) clamped=false
      PhysicalOffsetFrame talus_r_offset: socket_parent=/bodyset/talus_r translation=(0 -0.01798854 0.001464916)
          orientation=(0 0.350105 0)
      PhysicalOffsetFrame calcn_r_offset: socket_parent=/bodyset/calcn_r
          translation=(0.06220381 0.02983073 -0.009743005) orientation=(0 0.200586 0.682645)
      SpatialTransform: axes_held_at_zero=(rotation2 rotation3 translation1 translation2 translation3)
        TransformAxis rotation1: coordinates=subtalar_angle_r axis=(1 0 0) LinearFunction(coefficients=1 0)
  ForceSet:
    Millard2012EquilibriumMuscle soleus_r: max_isometric_force=9500 optimal_fiber_length=0.04526136
        tendon_slack_length=0.2846897 pennation_angle_at_optimal=0.3814289 [radians] fiber_damping=0.01
        default_activation=0.01 minimum_activation=0.01
      PathPoint P1: tibia_r (-0.007815786 -0.09420079 0.01007825)
      PathPoint P2: calcn_r (0.004648472 0.0327506 -0.005599296)
      ActiveForceLengthCurve: min_norm_active_fiber_length=0.25 transition_norm_fiber_length=0.77
          max_norm_active_fiber_length=1.9 shallow_ascending_slope=0.75 minimum_value=0
      ForceVelocityCurve: concentric_slope_at_vmax=0 concentric_slope_near_vmax=0.25 isometric_slope=5
          eccentric_slope_at_vmax=0 eccentric_slope_near_vmax=0.15 max_eccentric_velocity_force_multiplier=1.4
      FiberForceLengthCurve: strain_at_zero_force=0 strain_at_one_norm_force=0.7
      TendonForceLengthCurve
    Millard2012EquilibriumMuscle tibant_r: max_isometric_force=2000 optimal_fiber_length=0.07052795
        tendon_slack_length=0.2483049 pennation_angle_at_optimal=0.1951828 fiber_damping=0.01 default_activation=0.01
        minimum_activation=0.01
      PathPoint P1: tibia_r (0.01583725 -0.1349251 0.01665997)
      PathPoint P2: tibia_r (0.02581266 -0.1960117 0.01316343)
      PathPoint P3: tibia_r (0.02396155 -0.376289 -0.01357479)
      PathPoint P4: calcn_r (0.1231845 0.01880518 -0.03222237)
      ActiveForceLengthCurve: min_norm_active_fiber_length=0.25 transition_norm_fiber_length=0.77
          max_norm_active_fiber_length=1.9 shallow_ascending_slope=0.75 minimum_value=0
      ForceVelocityCurve: concentric_slope_at_vmax=0 concentric_slope_near_vmax=0.25 isometric_slope=5
          eccentric_slope_at_vmax=0 eccentric_slope_near_vmax=0.15 max_eccentric_velocity_force_multiplier=1.4
      FiberForceLengthCurve: strain_at_zero_force=0 strain_at_one_norm_force=0.7
      TendonForceLengthCurve
    ObjectGroup Sol: members=soleus_r
    ObjectGroup TibAnt: members=tibant_r
